<?xml version="1.0"?>
<fdm_config name="Northrop Grumman B-2A" version="2.0" release="BETA">
    <fileheader>
        <!-- glideslope: written by tools/make_b2.py, which says where each number
             comes from. Do not edit it by hand. -->
        <author>glideslope</author>
        <filecreationdate>2026-09-19</filecreationdate>
        <description>Northrop Grumman B-2A Spirit, F118-GE-100</description>
    </fileheader>
    <metrics>
        <wingarea unit="FT2"> 5229 </wingarea>
        <wingspan unit="FT"> 172.0 </wingspan>
        <chord unit="FT"> 37.14 </chord>
        <location name="AERORP" unit="IN">
            <x> 355.4 </x>
            <y> 0.0 </y>
            <z> 0.0 </z>
        </location>
        <location name="EYEPOINT" unit="IN">
            <x> 120.0 </x>
            <y> -20.0 </y>
            <z> 40.0 </z>
        </location>
        <location name="VRP" unit="IN">
            <x> 0.0 </x>
            <y> 0.0 </y>
            <z> 0.0 </z>
        </location>
    </metrics>
    <mass_balance>
        <ixx unit="SLUG*FT2"> 9.195e+06 </ixx>
        <iyy unit="SLUG*FT2"> 2.131e+06 </iyy>
        <izz unit="SLUG*FT2"> 9.945e+06 </izz>
        <emptywt unit="LBS"> 160000 </emptywt>
        <location name="CG" unit="IN">
            <x> 355.4 </x>
            <y> 0.0 </y>
            <z> 0.0 </z>
        </location>
        <pointmass name="Crew">
            <weight unit="LBS"> 0 </weight>
            <location unit="IN">
                <x> 140.0 </x>
                <y> 0.0 </y>
                <z> 30.0 </z>
            </location>
        </pointmass>
        <pointmass name="Weapons">
            <weight unit="LBS"> 0 </weight>
            <location unit="IN">
                <x> 355.4 </x>
                <y> 0.0 </y>
                <z> -20.0 </z>
            </location>
        </pointmass>
    </mass_balance>
    <ground_reactions>
        <contact type="BOGEY" name="NOSE">
            <location unit="IN">
                <x> 180.0 </x>
                <y> 0.0 </y>
                <z> -132.0 </z>
            </location>
            <static_friction> 0.80 </static_friction>
            <dynamic_friction> 0.50 </dynamic_friction>
            <rolling_friction> 0.02 </rolling_friction>
            <spring_coeff unit="LBS/FT"> 78109 </spring_coeff>
            <damping_coeff unit="LBS/FT/SEC"> 20829 </damping_coeff>
            <max_steer unit="DEG"> 5 </max_steer>
            <brake_group> NONE </brake_group>
            <retractable>1</retractable>
        </contact>
        <contact type="BOGEY" name="LEFT_MAIN">
            <location unit="IN">
                <x> 395.4 </x>
                <y> -240.0 </y>
                <z> -132.0 </z>
            </location>
            <static_friction> 0.50 </static_friction>
            <dynamic_friction> 0.50 </dynamic_friction>
            <rolling_friction> 0.02 </rolling_friction>
            <spring_coeff unit="LBS/FT"> 171258 </spring_coeff>
            <damping_coeff unit="LBS/FT/SEC"> 45669 </damping_coeff>
            <max_steer unit="DEG"> 0 </max_steer>
            <brake_group> LEFT </brake_group>
            <retractable>1</retractable>
        </contact>
        <contact type="BOGEY" name="RIGHT_MAIN">
            <location unit="IN">
                <x> 395.4 </x>
                <y> 240.0 </y>
                <z> -132.0 </z>
            </location>
            <static_friction> 0.50 </static_friction>
            <dynamic_friction> 0.50 </dynamic_friction>
            <rolling_friction> 0.02 </rolling_friction>
            <spring_coeff unit="LBS/FT"> 171258 </spring_coeff>
            <damping_coeff unit="LBS/FT/SEC"> 45669 </damping_coeff>
            <max_steer unit="DEG"> 0 </max_steer>
            <brake_group> RIGHT </brake_group>
            <retractable>1</retractable>
        </contact>
        <contact type="STRUCTURE" name="NOSE">
            <location unit="IN">
                <x> 74.7 </x>
                <y> -0.6 </y>
                <z> -69.9 </z>
            </location>
            <static_friction> 0.4 </static_friction>
            <dynamic_friction> 0.4 </dynamic_friction>
            <spring_coeff unit="LBS/FT"> 1346000 </spring_coeff>
            <damping_coeff unit="LBS/FT/SEC"> 237297 </damping_coeff>
        </contact>
        <contact type="STRUCTURE" name="BELLY_1">
            <location unit="IN">
                <x> 232.5 </x>
                <y> -0.6 </y>
                <z> -86.1 </z>
            </location>
            <static_friction> 0.4 </static_friction>
            <dynamic_friction> 0.4 </dynamic_friction>
            <spring_coeff unit="LBS/FT"> 1346000 </spring_coeff>
            <damping_coeff unit="LBS/FT/SEC"> 237297 </damping_coeff>
        </contact>
        <contact type="STRUCTURE" name="BELLY_2">
            <location unit="IN">
                <x> 389.1 </x>
                <y> -0.6 </y>
                <z> -82.6 </z>
            </location>
            <static_friction> 0.4 </static_friction>
            <dynamic_friction> 0.4 </dynamic_friction>
            <spring_coeff unit="LBS/FT"> 1346000 </spring_coeff>
            <damping_coeff unit="LBS/FT/SEC"> 237297 </damping_coeff>
        </contact>
        <contact type="STRUCTURE" name="BELLY_3">
            <location unit="IN">
                <x> 517.2 </x>
                <y> -0.7 </y>
                <z> -75.6 </z>
            </location>
            <static_friction> 0.4 </static_friction>
            <dynamic_friction> 0.4 </dynamic_friction>
            <spring_coeff unit="LBS/FT"> 1346000 </spring_coeff>
            <damping_coeff unit="LBS/FT/SEC"> 237297 </damping_coeff>
        </contact>
        <contact type="STRUCTURE" name="LEFT_WING_TIP">
            <location unit="IN">
                <x> 758.7 </x>
                <y> -968.3 </y>
                <z> -33.4 </z>
            </location>
            <static_friction> 0.4 </static_friction>
            <dynamic_friction> 0.4 </dynamic_friction>
            <spring_coeff unit="LBS/FT"> 1346000 </spring_coeff>
            <damping_coeff unit="LBS/FT/SEC"> 237297 </damping_coeff>
        </contact>
        <contact type="STRUCTURE" name="RIGHT_WING_TIP">
            <location unit="IN">
                <x> 758.7 </x>
                <y> 967.0 </y>
                <z> -33.4 </z>
            </location>
            <static_friction> 0.4 </static_friction>
            <dynamic_friction> 0.4 </dynamic_friction>
            <spring_coeff unit="LBS/FT"> 1346000 </spring_coeff>
            <damping_coeff unit="LBS/FT/SEC"> 237297 </damping_coeff>
        </contact>
        <contact type="STRUCTURE" name="LEFT_TAIL_STRIKE">
            <location unit="IN">
                <x> 741.3 </x>
                <y> -862.5 </y>
                <z> -37.2 </z>
            </location>
            <static_friction> 0.4 </static_friction>
            <dynamic_friction> 0.4 </dynamic_friction>
            <spring_coeff unit="LBS/FT"> 1346000 </spring_coeff>
            <damping_coeff unit="LBS/FT/SEC"> 237297 </damping_coeff>
        </contact>
        <contact type="STRUCTURE" name="RIGHT_TAIL_STRIKE">
            <location unit="IN">
                <x> 741.3 </x>
                <y> 862.5 </y>
                <z> -37.2 </z>
            </location>
            <static_friction> 0.4 </static_friction>
            <dynamic_friction> 0.4 </dynamic_friction>
            <spring_coeff unit="LBS/FT"> 1346000 </spring_coeff>
            <damping_coeff unit="LBS/FT/SEC"> 237297 </damping_coeff>
        </contact>
    </ground_reactions>
    <propulsion>
        <engine file="F118-GE-100">
            <feed>0</feed>
            <feed>1</feed>
            <feed>2</feed>
            <feed>3</feed>
            <thruster file="direct">
                <location unit="IN">
                    <x> 511.4 </x>
                    <y> -150.0 </y>
                    <z> 0.0 </z>
                </location>
            </thruster>
        </engine>
        <engine file="F118-GE-100">
            <feed>0</feed>
            <feed>1</feed>
            <feed>2</feed>
            <feed>3</feed>
            <thruster file="direct">
                <location unit="IN">
                    <x> 511.4 </x>
                    <y> -90.0 </y>
                    <z> 0.0 </z>
                </location>
            </thruster>
        </engine>
        <engine file="F118-GE-100">
            <feed>0</feed>
            <feed>1</feed>
            <feed>2</feed>
            <feed>3</feed>
            <thruster file="direct">
                <location unit="IN">
                    <x> 511.4 </x>
                    <y> 90.0 </y>
                    <z> 0.0 </z>
                </location>
            </thruster>
        </engine>
        <engine file="F118-GE-100">
            <feed>0</feed>
            <feed>1</feed>
            <feed>2</feed>
            <feed>3</feed>
            <thruster file="direct">
                <location unit="IN">
                    <x> 511.4 </x>
                    <y> 150.0 </y>
                    <z> 0.0 </z>
                </location>
            </thruster>
        </engine>
        <tank type="FUEL">
            <location unit="IN">
                <x> 408.6 </x>
                <y> -400.0 </y>
                <z> 0.0 </z>
            </location>
            <capacity unit="LBS"> 41750 </capacity>
            <contents unit="LBS"> 41750 </contents>
        </tank>
        <tank type="FUEL">
            <location unit="IN">
                <x> 382.0 </x>
                <y> -200.0 </y>
                <z> 0.0 </z>
            </location>
            <capacity unit="LBS"> 41750 </capacity>
            <contents unit="LBS"> 41750 </contents>
        </tank>
        <tank type="FUEL">
            <location unit="IN">
                <x> 382.0 </x>
                <y> 200.0 </y>
                <z> 0.0 </z>
            </location>
            <capacity unit="LBS"> 41750 </capacity>
            <contents unit="LBS"> 41750 </contents>
        </tank>
        <tank type="FUEL">
            <location unit="IN">
                <x> 408.6 </x>
                <y> 400.0 </y>
                <z> 0.0 </z>
            </location>
            <capacity unit="LBS"> 41750 </capacity>
            <contents unit="LBS"> 41750 </contents>
        </tank>
    </propulsion>
    <flight_control name="B-2A">
        <channel name="Controls">
            <pure_gain name="Pitch Damper">
                <input>velocities/q-aero-rad_sec</input>
                <gain>1.0</gain>
                <clipto><min>-0.3</min><max>0.3</max></clipto>
            </pure_gain>
            <summer name="Elevator Sum">
                <input>fcs/elevator-cmd-norm</input>
                <input>fcs/pitch-trim-cmd-norm</input>
                <input>fcs/pitch-damper</input>
                <clipto><min>-1</min><max>1</max></clipto>
            </summer>
            <aerosurface_scale name="Elevator">
                <input>fcs/elevator-sum</input>
                <range><min>-0.4363</min><max>0.4363</max></range>
                <output>fcs/elevator-pos-rad</output>
            </aerosurface_scale>
            <summer name="Aileron Sum">
                <input>fcs/aileron-cmd-norm</input>
                <input>fcs/roll-trim-cmd-norm</input>
                <clipto><min>-1</min><max>1</max></clipto>
            </summer>
            <aerosurface_scale name="Aileron">
                <input>fcs/aileron-sum</input>
                <range><min>-0.4363</min><max>0.4363</max></range>
                <output>fcs/left-aileron-pos-rad</output>
            </aerosurface_scale>
            <pure_gain name="Right Aileron">
                <input>-fcs/left-aileron-pos-rad</input>
                <gain>1</gain>
                <output>fcs/right-aileron-pos-rad</output>
            </pure_gain>
            <washout_filter name="Yaw Rate Washout">
                <input>velocities/r-aero-rad_sec</input>
                <c1>0.5</c1>
            </washout_filter>
            <pure_gain name="Yaw Damper">
                <input>fcs/yaw-rate-washout</input>
                <gain>3.0</gain>
                <clipto><min>-0.2</min><max>0.2</max></clipto>
            </pure_gain>
            <pure_gain name="Sideslip Feedback">
                <input>aero/beta-rad</input>
                <gain>-4.0</gain>
                <clipto><min>-0.5</min><max>0.5</max></clipto>
            </pure_gain>
            <summer name="Rudder Sum">
                <input>fcs/rudder-cmd-norm</input>
                <input>fcs/yaw-trim-cmd-norm</input>
                <input>fcs/yaw-damper</input>
                <input>fcs/sideslip-feedback</input>
                <clipto><min>-1</min><max>1</max></clipto>
            </summer>
            <aerosurface_scale name="Rudder">
                <input>fcs/rudder-sum</input>
                <range><min>-0.7854</min><max>0.7854</max></range>
                <output>fcs/rudder-pos-rad</output>
            </aerosurface_scale>
            <kinematic name="Gear">
                <input>gear/gear-cmd-norm</input>
                <traverse>
                    <setting>
                        <position> 0 </position>
                        <time> 0 </time>
                    </setting>
                    <setting>
                        <position> 1 </position>
                        <time> 8 </time>
                    </setting>
                </traverse>
                <output>gear/gear-pos-norm</output>
            </kinematic>
            <kinematic name="Speedbrake">
                <input>fcs/speedbrake-cmd-norm</input>
                <traverse>
                    <setting>
                        <position> 0 </position>
                        <time> 0 </time>
                    </setting>
                    <setting>
                        <position> 1 </position>
                        <time> 2.0 </time>
                    </setting>
                </traverse>
                <output>fcs/speedbrake-pos-norm</output>
            </kinematic>
        </channel>
    </flight_control>
    <aerodynamics>
        <function name="aero/function/kCLge">
            <description>Change_in_lift_due_to_ground_effect</description>
            <table>
                <independentVar>aero/h_b-mac-ft</independentVar>
                <tableData>
                    0.0	1.203
                    0.1	1.127
                    0.15	1.09
                    0.2	1.073
                    0.3	1.046
                    0.4	1.055
                    0.5	1.019
                    0.6	1.013
                    0.7	1.008
                    0.8	1.006
                    0.9	1.003
                    1.0	1.002
                    1.1	1.0
                </tableData>
            </table>
        </function>
        <function name="aero/function/kCDge">
            <description>Change_in_drag_due_to_ground_effect</description>
            <table>
                <independentVar>aero/h_b-mac-ft</independentVar>
                <tableData>
                    0.0	0.48
                    0.1	0.515
                    0.15	0.629
                    0.2	0.709
                    0.3	0.815
                    0.4	0.882
                    0.5	0.928
                    0.6	0.962
                    0.7	0.988
                    0.8	1.0
                    0.9	1.0
                    1.0	1.0
                    1.1	1.0
                </tableData>
            </table>
        </function>
        <axis name="LIFT">
            <function name="aero/coefficient/CLalpha">
                <description>Lift_due_to_alpha</description>
                <product>
                    <property>aero/qbar-psf</property>
                    <property>metrics/Sw-sqft</property>
                    <property>aero/function/kCLge</property>
                    <table>
                        <independentVar lookup="row">aero/alpha-rad</independentVar>
                        <independentVar lookup="column">velocities/mach</independentVar>
                        <tableData>
                                	0.00	0.20	0.40	0.50	0.60	0.70	0.80	0.85	0.90	0.95	1.00	1.05
                            -0.4000	-1.5738	-1.5917	-1.6497	-1.6981	-1.7642	-1.8546	-1.9814	-2.0651	-2.1686	-2.1003	-2.0320	-1.9637
                            0.0000	0.0000	0.0000	0.0000	0.0000	0.0000	0.0000	0.0000	0.0000	0.0000	0.0000	0.0000	0.0000
                            0.2600	1.0230	1.0346	1.0723	1.1037	1.1467	1.2055	1.2879	1.3423	1.4096	1.3652	1.3208	1.2764
                            0.3800	0.8184	0.8277	0.8578	0.8830	0.9174	0.9644	1.0303	1.0739	1.1277	1.0922	1.0567	1.0211
                            0.8000	0.6138	0.6208	0.6434	0.6622	0.6880	0.7233	0.7728	0.8054	0.8458	0.8191	0.7925	0.7659
                            1.5700	0.0000	0.0000	0.0000	0.0000	0.0000	0.0000	0.0000	0.0000	0.0000	0.0000	0.0000	-0.0000
                        </tableData>
                    </table>
                </product>
            </function>
            <function name="aero/coefficient/CLde">
                <description>Lift_due_to_elevons</description>
                <product>
                    <property>aero/qbar-psf</property>
                    <property>metrics/Sw-sqft</property>
                    <property>fcs/elevator-pos-rad</property>
                    <value>0.6</value>
                </product>
            </function>
        </axis>
        <axis name="DRAG">
            <function name="aero/coefficient/CD0">
                <description>Drag_at_zero_lift</description>
                <product>
                    <property>aero/qbar-psf</property>
                    <property>metrics/Sw-sqft</property>
                    <table>
                        <independentVar>aero/alpha-rad</independentVar>
                        <tableData>
                            -1.57	1.3
                            -0.26	0.05
                            0.0	0.008
                            0.2	0.008
                            0.4	0.15
                            1.57	1.4
                        </tableData>
                    </table>
                </product>
            </function>
            <function name="aero/coefficient/CDi">
                <description>Induced_drag</description>
                <product>
                    <property>aero/qbar-psf</property>
                    <property>metrics/Sw-sqft</property>
                    <property>aero/cl-squared</property>
                    <property>aero/function/kCDge</property>
                    <value>0.070324</value>
                </product>
            </function>
            <function name="aero/coefficient/CDmach">
                <description>Drag_due_to_mach</description>
                <product>
                    <property>aero/qbar-psf</property>
                    <property>metrics/Sw-sqft</property>
                    <table>
                        <independentVar>velocities/mach</independentVar>
                        <tableData>
                            0.000	0.00000
                            0.732	0.00000
                            0.740	0.00000
                            0.750	0.00000
                            0.760	0.00001
                            0.770	0.00004
                            0.780	0.00010
                            0.790	0.00022
                            0.800	0.00042
                            0.810	0.00073
                            0.820	0.00118
                            0.830	0.00182
                            0.840	0.00269
                            0.850	0.00384
                            0.860	0.00532
                            0.870	0.00720
                            0.880	0.00952
                            0.890	0.01238
                            0.900	0.01583
                            0.910	0.01995
                            0.920	0.02484
                            0.930	0.03057
                            0.940	0.03724
                            0.950	0.04494
                            0.960	0.05378
                            0.970	0.06387
                            0.980	0.07532
                            0.990	0.08823
                            1.000	0.10275
                        </tableData>
                    </table>
                </product>
            </function>
            <function name="aero/coefficient/CDgear">
                <description>Drag_due_to_gear</description>
                <product>
                    <property>aero/qbar-psf</property>
                    <property>metrics/Sw-sqft</property>
                    <property>gear/gear-pos-norm</property>
                    <value>0.006</value>
                </product>
            </function>
            <function name="aero/coefficient/CDrudders">
                <description>Drag_of_the_drag_rudders</description>
                <product>
                    <property>aero/qbar-psf</property>
                    <property>metrics/Sw-sqft</property>
                    <property>fcs/mag-rudder-pos-rad</property>
                    <value>0.02</value>
                </product>
            </function>
            <function name="aero/coefficient/CDspeedbrake">
                <description>Drag_of_the_drag_rudders_opened_together</description>
                <product>
                    <property>aero/qbar-psf</property>
                    <property>metrics/Sw-sqft</property>
                    <property>fcs/speedbrake-pos-norm</property>
                    <value>0.064912</value>
                </product>
            </function>
            <function name="aero/coefficient/CDbeta">
                <description>Drag_due_to_sideslip</description>
                <product>
                    <property>aero/qbar-psf</property>
                    <property>metrics/Sw-sqft</property>
                    <property>aero/mag-beta-rad</property>
                    <value>0.1</value>
                </product>
            </function>
            <function name="aero/coefficient/CDde">
                <description>Drag_due_to_elevons</description>
                <product>
                    <property>aero/qbar-psf</property>
                    <property>metrics/Sw-sqft</property>
                    <property>fcs/mag-elevator-pos-rad</property>
                    <value>0.01</value>
                </product>
            </function>
        </axis>
        <axis name="SIDE">
            <function name="aero/coefficient/CYb">
                <description>Side_force_due_to_beta</description>
                <product>
                    <property>aero/qbar-psf</property>
                    <property>metrics/Sw-sqft</property>
                    <property>aero/beta-rad</property>
                    <value>-0.1</value>
                </product>
            </function>
        </axis>
        <axis name="ROLL">
            <function name="aero/coefficient/Clb">
                <description>Roll_moment_due_to_beta</description>
                <product>
                    <property>aero/qbar-psf</property>
                    <property>metrics/Sw-sqft</property>
                    <property>metrics/bw-ft</property>
                    <property>aero/beta-rad</property>
                    <value>-0.12</value>
                </product>
            </function>
            <function name="aero/coefficient/Clp">
                <description>Roll_moment_due_to_roll_rate</description>
                <product>
                    <property>aero/qbar-psf</property>
                    <property>metrics/Sw-sqft</property>
                    <property>metrics/bw-ft</property>
                    <property>aero/bi2vel</property>
                    <property>velocities/p-aero-rad_sec</property>
                    <value>-0.45</value>
                </product>
            </function>
            <function name="aero/coefficient/Clr">
                <description>Roll_moment_due_to_yaw_rate</description>
                <product>
                    <property>aero/qbar-psf</property>
                    <property>metrics/Sw-sqft</property>
                    <property>metrics/bw-ft</property>
                    <property>aero/bi2vel</property>
                    <property>velocities/r-aero-rad_sec</property>
                    <value>0.1</value>
                </product>
            </function>
            <function name="aero/coefficient/Clda">
                <description>Roll_moment_due_to_elevons</description>
                <product>
                    <property>aero/qbar-psf</property>
                    <property>metrics/Sw-sqft</property>
                    <property>metrics/bw-ft</property>
                    <property>fcs/left-aileron-pos-rad</property>
                    <value>0.24</value>
                </product>
            </function>
        </axis>
        <axis name="PITCH">
            <function name="aero/coefficient/Cmalpha">
                <description>Pitch_moment_due_to_alpha</description>
                <product>
                    <property>aero/qbar-psf</property>
                    <property>metrics/Sw-sqft</property>
                    <property>metrics/cbarw-ft</property>
                    <property>aero/alpha-rad</property>
                    <value>-0.2</value>
                </product>
            </function>
            <function name="aero/coefficient/Cmq">
                <description>Pitch_moment_due_to_pitch_rate</description>
                <product>
                    <property>aero/qbar-psf</property>
                    <property>metrics/Sw-sqft</property>
                    <property>metrics/cbarw-ft</property>
                    <property>aero/ci2vel</property>
                    <property>velocities/q-aero-rad_sec</property>
                    <value>-2</value>
                </product>
            </function>
            <function name="aero/coefficient/Cmde">
                <description>Pitch_moment_due_to_elevons</description>
                <product>
                    <property>aero/qbar-psf</property>
                    <property>metrics/Sw-sqft</property>
                    <property>metrics/cbarw-ft</property>
                    <property>fcs/elevator-pos-rad</property>
                    <value>-0.4</value>
                </product>
            </function>
        </axis>
        <axis name="YAW">
            <function name="aero/coefficient/Cnb">
                <description>Yaw_moment_due_to_beta</description>
                <product>
                    <property>aero/qbar-psf</property>
                    <property>metrics/Sw-sqft</property>
                    <property>metrics/bw-ft</property>
                    <property>aero/beta-rad</property>
                    <value>0.01</value>
                </product>
            </function>
            <function name="aero/coefficient/Cnp">
                <description>Yaw_moment_due_to_roll_rate</description>
                <product>
                    <property>aero/qbar-psf</property>
                    <property>metrics/Sw-sqft</property>
                    <property>metrics/bw-ft</property>
                    <property>aero/bi2vel</property>
                    <property>velocities/p-aero-rad_sec</property>
                    <value>-0.02</value>
                </product>
            </function>
            <function name="aero/coefficient/Cnr">
                <description>Yaw_moment_due_to_yaw_rate</description>
                <product>
                    <property>aero/qbar-psf</property>
                    <property>metrics/Sw-sqft</property>
                    <property>metrics/bw-ft</property>
                    <property>aero/bi2vel</property>
                    <property>velocities/r-aero-rad_sec</property>
                    <value>-0.03</value>
                </product>
            </function>
            <function name="aero/coefficient/Cndr">
                <description>Yaw_moment_due_to_drag_rudders</description>
                <product>
                    <property>aero/qbar-psf</property>
                    <property>metrics/Sw-sqft</property>
                    <property>metrics/bw-ft</property>
                    <property>fcs/rudder-pos-rad</property>
                    <value>-0.03</value>
                </product>
            </function>
        </axis>
    </aerodynamics>
</fdm_config>
