<?xml version="1.0"?>
<?xml-stylesheet type="text/xsl" href="http://jsbsim.sourceforge.net/JSBSim.xsl"?>
<fdm_config name="f15" version="2.0" release="BETA"
    xmlns:xsi="http://www.w3.org/2001/XMLSchema-instance"
    xsi:noNamespaceSchemaLocation="http://jsbsim.sourceforge.net/JSBSim.xsd">

    <fileheader>
        <!-- glideslope: this is JSBSim's f15 with the changes listed in
             tools/make_f15c.py, which made it. Do not edit it by hand. -->
        <author> Erik Hofman </author>
        <filecreationdate>2005-01-01</filecreationdate>
        <version> $Revision: 1.31 $ </version>
        <description> McDonnell Douglas F-15 Eagle </description>
      <note>
        This model was created using publicly available data, publicly available
        technical reports, textbooks, and guesses. It contains no proprietary or
        restricted data. If this model has been validated at all, it would be
        only to the extent that it seems to "fly right", and that it possibly
        complies with published, publicly known, performance data (maximum speed,
        endurance, etc.). Thus, this model is meant for educational and entertainment
        purposes only.

        This simulation model is not endorsed by the manufacturer. This model is not
        to be sold.
      </note>
    </fileheader>

    <metrics>
        <wingarea unit="FT2"> 608 </wingarea>
        <wingspan unit="FT"> 42.83 </wingspan>
        <chord unit="FT"> 15.95 </chord>
        <htailarea unit="FT2"> 45.01 </htailarea>
        <htailarm unit="FT"> 20 </htailarm>
        <vtailarea unit="FT2"> 46.96 </vtailarea>
        <vtailarm unit="FT"> 0 </vtailarm>
        <location name="AERORP" unit="IN">
            <x> -208.85 </x>
            <y> 0 </y>
            <z> 0 </z>
        </location>
        <location name="EYEPOINT" unit="IN">
            <x> -398.45 </x>
            <y> 0 </y>
            <z> 37 </z>
        </location>
        <location name="VRP" unit="IN">
            <x> -237.25 </x>
            <y> 0 </y>
            <z> 4.58 </z>
        </location>
    </metrics>

    <mass_balance negated_crossproduct_inertia="true">
        <ixx unit="SLUG*FT2"> 28700 </ixx>
        <iyy unit="SLUG*FT2"> 165100 </iyy>
        <izz unit="SLUG*FT2"> 187900 </izz>
        <ixz unit="SLUG*FT2"> 520 </ixz>
        <emptywt unit="LBS"> 28476 </emptywt>
        <location name="CG" unit="IN">
            <x> -211.09 </x>
            <y> 0 </y>
            <z> 4.5 </z>
        </location>
        <pointmass name="Pilot">
            <weight unit="LBS"> 230 </weight>
            <location unit="IN">
                <x> -398.45 </x>
                <y> 0 </y>
                <z> 20 </z>
            </location>
        </pointmass>
        <pointmass name="Stores">
            <weight unit="LBS"> 0 </weight>
            <location unit="IN">
                <x> -211.09 </x>
                <y> 0 </y>
                <z> 4.5 </z>
            </location>
        </pointmass>
    </mass_balance>

    <ground_reactions>
        <contact type="BOGEY" name="NOSE">
            <location unit="IN">
                <x> -393.2 </x>
                <y> 0 </y>
                <z> -89.2 </z>
            </location>
            <static_friction> 0.8 </static_friction>
            <dynamic_friction> 0.5 </dynamic_friction>
            <rolling_friction> 0.02 </rolling_friction>
            <spring_coeff unit="LBS/FT"> 12200 </spring_coeff>
            <damping_coeff unit="LBS/FT/SEC"> 5000 </damping_coeff>
            <max_steer unit="DEG"> 5 </max_steer>
            <brake_group> NONE </brake_group>
            <retractable>1</retractable>
        </contact>
        <contact type="BOGEY" name="MLG_LEFT">
            <location unit="IN">
                <x> -187 </x>
                <y> -54 </y>
                <z> -85.4 </z>
            </location>
            <static_friction> 0.8 </static_friction>
            <dynamic_friction> 0.5 </dynamic_friction>
            <rolling_friction> 0.02 </rolling_friction>
            <spring_coeff unit="LBS/FT"> 22704 </spring_coeff>
            <damping_coeff unit="LBS/FT/SEC"> 9000 </damping_coeff>
            <max_steer unit="DEG"> 0.0 </max_steer>
            <brake_group> LEFT </brake_group>
            <retractable>1</retractable>
        </contact>
        <contact type="BOGEY" name="MLG_RIGHT">
            <location unit="IN">
                <x> -187 </x>
                <y> 54 </y>
                <z> -85.4 </z>
            </location>
            <static_friction> 0.8 </static_friction>
            <dynamic_friction> 0.5 </dynamic_friction>
            <rolling_friction> 0.02 </rolling_friction>
            <spring_coeff unit="LBS/FT"> 22704 </spring_coeff>
            <damping_coeff unit="LBS/FT/SEC"> 9000 </damping_coeff>
            <max_steer unit="DEG"> 0.0 </max_steer>
            <brake_group> RIGHT </brake_group>
            <retractable>1</retractable>
        </contact>
        <contact type="STRUCTURE" name="WT_LEFT">
            <location unit="IN">
                <x> -92.2 </x>
                <y> -257 </y>
                <z> 10 </z>
            </location>
            <static_friction> 0.4 </static_friction>
            <dynamic_friction> 0.4 </dynamic_friction>
            <spring_coeff unit="LBS/FT"> 182852 </spring_coeff>
            <damping_coeff unit="LBS/FT/SEC"> 32236 </damping_coeff>
        </contact>
        <contact type="STRUCTURE" name="WT_RIGHT">
            <location unit="IN">
                <x> -92.2 </x>
                <y> 257 </y>
                <z> 10 </z>
            </location>
            <static_friction> 0.4 </static_friction>
            <dynamic_friction> 0.4 </dynamic_friction>
            <spring_coeff unit="LBS/FT"> 182852 </spring_coeff>
            <damping_coeff unit="LBS/FT/SEC"> 32236 </damping_coeff>
        </contact>
        <contact type="STRUCTURE" name="VT_LEFT">
            <location unit="IN">
                <x> 47.4 </x>
                <y> -69.7 </y>
                <z> 133.8 </z>
            </location>
            <static_friction> 0.4 </static_friction>
            <dynamic_friction> 0.4 </dynamic_friction>
            <spring_coeff unit="LBS/FT"> 182852 </spring_coeff>
            <damping_coeff unit="LBS/FT/SEC"> 32236 </damping_coeff>
        </contact>
        <contact type="STRUCTURE" name="VT_RIGHT">
            <location unit="IN">
                <x> 47.4 </x>
                <y> 69.7 </y>
                <z> 133.8 </z>
            </location>
            <static_friction> 0.4 </static_friction>
            <dynamic_friction> 0.4 </dynamic_friction>
            <spring_coeff unit="LBS/FT"> 182852 </spring_coeff>
            <damping_coeff unit="LBS/FT/SEC"> 32236 </damping_coeff>
        </contact>
        <contact type="STRUCTURE" name="RADOME">
            <location unit="IN">
                <x> -648.7 </x>
                <y> 0 </y>
                <z> -17 </z>
            </location>
            <static_friction> 0.4 </static_friction>
            <dynamic_friction> 0.4 </dynamic_friction>
            <spring_coeff unit="LBS/FT"> 182852 </spring_coeff>
            <damping_coeff unit="LBS/FT/SEC"> 32236 </damping_coeff>
        </contact>
        <contact type="STRUCTURE" name="BELLY">
            <location unit="IN">
                <x> -187 </x>
                <y> 0 </y>
                <z> -37 </z>
            </location>
            <static_friction> 0.4 </static_friction>
            <dynamic_friction> 0.4 </dynamic_friction>
            <spring_coeff unit="LBS/FT"> 182852 </spring_coeff>
            <damping_coeff unit="LBS/FT/SEC"> 32236 </damping_coeff>
        </contact>
        <contact type="STRUCTURE" name="LEFT_FORE_FLANK">
            <location unit="IN">
                <x> -316.2 </x>
                <y> -72.8 </y>
                <z> -40.2 </z>
            </location>
            <static_friction> 0.4 </static_friction>
            <dynamic_friction> 0.4 </dynamic_friction>
            <spring_coeff unit="LBS/FT"> 182852 </spring_coeff>
            <damping_coeff unit="LBS/FT/SEC"> 32236 </damping_coeff>
        </contact>
        <contact type="STRUCTURE" name="LEFT_AFT_FLANK">
            <location unit="IN">
                <x> -57.4 </x>
                <y> -73.2 </y>
                <z> -40.2 </z>
            </location>
            <static_friction> 0.4 </static_friction>
            <dynamic_friction> 0.4 </dynamic_friction>
            <spring_coeff unit="LBS/FT"> 182852 </spring_coeff>
            <damping_coeff unit="LBS/FT/SEC"> 32236 </damping_coeff>
        </contact>
        <contact type="STRUCTURE" name="RIGHT_FORE_FLANK">
            <location unit="IN">
                <x> -316.0 </x>
                <y> 70.2 </y>
                <z> -40.2 </z>
            </location>
            <static_friction> 0.4 </static_friction>
            <dynamic_friction> 0.4 </dynamic_friction>
            <spring_coeff unit="LBS/FT"> 182852 </spring_coeff>
            <damping_coeff unit="LBS/FT/SEC"> 32236 </damping_coeff>
        </contact>
        <contact type="STRUCTURE" name="RIGHT_AFT_FLANK">
            <location unit="IN">
                <x> -57.2 </x>
                <y> 69.9 </y>
                <z> -40.0 </z>
            </location>
            <static_friction> 0.4 </static_friction>
            <dynamic_friction> 0.4 </dynamic_friction>
            <spring_coeff unit="LBS/FT"> 182852 </spring_coeff>
            <damping_coeff unit="LBS/FT/SEC"> 32236 </damping_coeff>
        </contact>
        <contact type="STRUCTURE" name="LEFT_TAIL_STRIKE">
            <location unit="IN">
                <x> 116.5 </x>
                <y> -146.6 </y>
                <z> -2.7 </z>
            </location>
            <static_friction> 0.4 </static_friction>
            <dynamic_friction> 0.4 </dynamic_friction>
            <spring_coeff unit="LBS/FT"> 182852 </spring_coeff>
            <damping_coeff unit="LBS/FT/SEC"> 32236 </damping_coeff>
        </contact>
        <contact type="STRUCTURE" name="RIGHT_TAIL_STRIKE">
            <location unit="IN">
                <x> 116.5 </x>
                <y> 146.6 </y>
                <z> -2.7 </z>
            </location>
            <static_friction> 0.4 </static_friction>
            <dynamic_friction> 0.4 </dynamic_friction>
            <spring_coeff unit="LBS/FT"> 182852 </spring_coeff>
            <damping_coeff unit="LBS/FT/SEC"> 32236 </damping_coeff>
        </contact>
    </ground_reactions>
    <propulsion>
        <engine file="F100-PW-220">
            <feed>0</feed>
            <feed>1</feed>
            <thruster file="direct">
                <location unit="IN">
                    <x> 50 </x>
                    <y> -25.5 </y>
                    <z> 0 </z>
                </location>
                <orient unit="DEG">
                    <roll> 0.0 </roll>
                    <pitch> 0.0 </pitch>
                    <yaw> 0.0 </yaw>
                </orient>
            </thruster>
        </engine>
        <engine file="F100-PW-220">
            <feed>0</feed>
            <feed>1</feed>
            <thruster file="direct">
                <location unit="IN">
                    <x> 50 </x>
                    <y> 25.5 </y>
                    <z> 0 </z>
                </location>
                <orient unit="DEG">
                    <roll> 0.0 </roll>
                    <pitch> 0.0 </pitch>
                    <yaw> 0.0 </yaw>
                </orient>
            </thruster>
        </engine>
        <tank type="FUEL">    <!-- Tank number 0 -->
            <location unit="IN">
                <x> -211.09 </x>
                <y> 0 </y>
                <z> 4.5 </z>
            </location>
            <capacity unit="LBS"> 6727.5 </capacity>
            <contents unit="LBS"> 2500 </contents>
        </tank>
        <tank type="FUEL">    <!-- Tank number 1 -->
            <location unit="IN">
                <x> -211.09 </x>
                <y> 0 </y>
                <z> 4.5 </z>
            </location>
            <capacity unit="LBS"> 6727.5 </capacity>
            <contents unit="LBS"> 2500 </contents>
        </tank>
    </propulsion>
    <flight_control name="FCS: f15">
        <channel name="Pitch">
            <summer name="Pitch Trim Sum">
                <input>fcs/elevator-cmd-norm</input>
                <input>fcs/pitch-trim-cmd-norm</input>
                <clipto>
                    <min>-1</min>
                    <max>1</max>
                </clipto>
            </summer>

             <kinematic name="elevator position">
                <input>fcs/pitch-trim-sum</input>
                <traverse>
                    <setting>
                        <position>-1</position>
                        <time>0.6</time>
                    </setting>
                    <setting>
                        <position>1</position>
                        <time>0.6</time>
                    </setting>
                </traverse>
                <output>fcs/elevator-pos-norm</output>
            </kinematic>

            <aerosurface_scale name="elevator position">
                <input>fcs/elevator-pos-norm</input>
                <gain>0.01745</gain>
                <domain>
                    <min>-1</min>
                    <max>1</max>
                </domain>
                <range>
                    <min>-26</min>
                    <max>15</max>
                </range>
                <output>fcs/elevator-pos-rad</output>
            </aerosurface_scale>
        </channel>
        <channel name="Roll">
            <summer name="Roll Trim Sum">
                <input>fcs/aileron-cmd-norm</input>
                <input>fcs/roll-trim-cmd-norm</input>
                <clipto>
                    <min>-1</min>
                    <max>1</max>
                </clipto>
            </summer>

            <kinematic name="aileron pos norm">
                <input>fcs/roll-trim-sum</input>
                <traverse>
                    <setting>
                        <position>-1</position>
                        <time>0.3</time>
                    </setting>
                    <setting>
                        <position>1</position>
                        <time>0.3</time>
                    </setting>
                </traverse>
                <output>fcs/left-aileron-pos-norm</output>
            </kinematic>

            <aerosurface_scale name="Left Aileron Control">
                <input>fcs/aileron-pos-norm</input>
                <gain>0.01745</gain>
                <range>
                    <min>-20</min>
                    <max>20</max>
                </range>
                <output>fcs/left-aileron-pos-rad</output>
            </aerosurface_scale>

            <aerosurface_scale name="Right Aileron Control">
                <input>fcs/aileron-pos-norm</input>
                <gain>-0.01745</gain>
                <range>
                    <min>-20</min>
                    <max>20</max>
                </range>
                <output>fcs/right-aileron-pos-rad</output>
            </aerosurface_scale>
        </channel>
        <channel name="Yaw">
            <pure_gain name="Yaw Damper Gain">
                <input>velocities/r-rad_sec</input>
                <gain>-0.001745</gain>
            </pure_gain>

            <summer name="Yaw Trim Sum">
                <input>fcs/rudder-cmd-norm</input>
                <input>fcs/yaw-trim-cmd-norm</input>
                <input>fcs/yaw-damper-gain</input>
                <clipto>
                    <min>-1</min>
                    <max>1</max>
                </clipto>
            </summer>

            <kinematic name="rudder position">
                <input>fcs/yaw-trim-sum</input>
                <traverse>
                    <setting>
                        <position>-1</position>
                        <time>0.4</time>
                    </setting>
                    <setting>
                        <position>1</position>
                        <time>0.4</time>
                    </setting>
                </traverse>
                <output>fcs/rudder-pos-norm</output>
            </kinematic>

            <aerosurface_scale name="Rudder Control">
                <input>fcs/rudder-pos-norm</input>
                <gain>0.01745</gain>
                <range>
                    <min>-30</min>
                    <max>30</max>
                </range>
                <output>fcs/rudder-pos-rad</output>
            </aerosurface_scale>
        </channel>
        <channel name="Landing Gear">
            <kinematic name="Gear Control">
                <input>gear/gear-cmd-norm</input>
                <traverse>
                    <setting>
                        <position>0</position>
                        <time>0</time>
                    </setting>
                    <setting>
                        <position>1</position>
                        <time>5</time>
                    </setting>
                </traverse>
                <output>gear/gear-pos-norm</output>
            </kinematic>
        </channel>
        <channel name="Speedbrake">
            <switch name="fcs/speedbrake-allowed-norm">
                <default value="0"/>
                <test value="fcs/speedbrake-cmd-norm">
                    aero/alpha-deg le 15.0
                </test>
            </switch>
            <kinematic name="Speedbrake Control">
                <input>fcs/speedbrake-allowed-norm</input>
                <traverse>
                    <setting>
                        <position>0</position>
                        <time>0</time>
                    </setting>
                    <setting>
                        <position>1</position>
                        <time>2</time>
                    </setting>
                </traverse>
                <output>fcs/speedbrake-pos-norm</output>
            </kinematic>
        </channel>
    </flight_control>
    <aerodynamics>

        <function name="aero/function/kCLge">
            <description>Change_in_lift_due_to_ground_effect</description>
            <table>
                <independentVar>aero/h_b-mac-ft</independentVar>
                <tableData>
                    0.0000	1.0610
                    0.1000	1.0330
                    0.1500	1.0310
                    0.2000	1.0330
                    0.3000	1.0280
                    0.4000	1.0110
                    0.5000	1.0090
                    0.6000	1.0050
                    0.7000	1.0020
                    0.8000	1.0000
                    0.9000	1.0000
                    1.0000	1.0000
                    1.1000	1.0000
                </tableData>
            </table>
        </function>

        <function name="aero/function/kCDge">
            <description>Change_in_drag_due_to_ground_effect</description>
            <table>
                <independentVar>aero/h_b-mac-ft</independentVar>
                <tableData>
                    0.0000	0.8100
                    0.1000	0.9900
                    0.1500	0.9500
                    0.2000	0.9800
                    0.3000	0.9900
                    0.4000	1.0000
                    0.5000	1.0400
                    0.6000	1.0100
                    0.7000	0.9900
                    0.8000	1.0100
                    0.9000	1.0000
                    1.0000	1.0000
                    1.1000	1.0000
                </tableData>
            </table>
        </function>

        <function name="aero/function/kCmge">
            <description>Change_in_pitch_due_to_ground_effect</description>
            <table>
                <independentVar>aero/h_b-mac-ft</independentVar>
                <tableData>
                    0.0000	0.9920
                    0.1000	0.9960
                    0.1500	0.9990
                    0.2000	0.9970
                    0.3000	1.0000
                    0.4000	1.0000
                    0.5000	1.0020
                    0.6000	1.0010
                    0.7000	0.9980
                    0.8000	0.9990
                    0.9000	1.0000
                    1.0000	1.0000
                    1.1000	1.0000
                </tableData>
            </table>
        </function>

        <axis name="DRAG">
            <function name="aero/coefficient/CD0">
                <description>Drag_at_zero_lift</description>
                <product>
                    <property>aero/qbar-psf</property>
                    <property>metrics/Sw-sqft</property>
                    <table>
                        <independentVar>velocities/mach</independentVar>
                        <tableData>
                              0.00	0.02500
                              0.20	0.02500
                              0.40	0.02500
                              0.50	0.02500
                              0.60	0.02500
                              0.70	0.02500
                              0.80	0.02500
                              0.85	0.02500
                              0.90	0.02644
                              0.95	0.03015
                              1.00	0.03523
                              1.05	0.04077
                              1.10	0.04585
                              1.20	0.05100
                              1.30	0.04875
                              1.40	0.04684
                              1.60	0.04378
                              1.80	0.04144
                              2.00	0.03960
                              2.20	0.03811
                              2.40	0.03688
                              2.60	0.03585
                        </tableData>
                    </table>
                </product>
            </function>
            <function name="aero/coefficient/CDi">
                <description>Drag_due_to_lift</description>
                <product>
                    <property>aero/qbar-psf</property>
                    <property>metrics/Sw-sqft</property>
                    <property>aero/function/kCDge</property>
                    <property>aero/cl-squared</property>
                    <table>
                        <independentVar>velocities/mach</independentVar>
                        <tableData>
                              0.00	0.21663
                              0.20	0.21663
                              0.40	0.21663
                              0.50	0.21663
                              0.60	0.21663
                              0.70	0.21663
                              0.80	0.21663
                              0.85	0.21663
                              0.90	0.21663
                              0.95	0.21663
                              1.00	0.21663
                              1.05	0.21663
                              1.10	0.21663
                              1.20	0.21663
                              1.30	0.21663
                              1.40	0.21663
                              1.60	0.22681
                              1.80	0.26508
                              2.00	0.30166
                              2.20	0.33715
                              2.40	0.37187
                              2.60	0.40604
                        </tableData>
                    </table>
                </product>
            </function>
            <function name="aero/coefficient/CDseparated">
                <description>Drag_past_the_flow_separating</description>
                <product>
                    <property>aero/qbar-psf</property>
                    <property>metrics/Sw-sqft</property>
                    <table>
                        <independentVar>aero/alpha-rad</independentVar>
                        <tableData>
                              -1.5708	1.0
                              -0.3845	1.0
                              -0.2100	0.0
                              0.2100	0.0
                              0.3845	1.0
                              1.5708	1.0
                        </tableData>
                    </table>
                    <difference>
                        <product>
                            <pow><property>aero/cl-squared</property><value>0.5</value></pow>
                            <min><abs><tan><property>aero/alpha-rad</property></tan></abs><value>1.732</value></min>
                        </product>
                        <product>
                            <property>aero/cl-squared</property>
                            <table>
                                <independentVar>velocities/mach</independentVar>
                                <tableData>
                                      0.00	0.21663
                                      0.20	0.21663
                                      0.40	0.21663
                                      0.50	0.21663
                                      0.60	0.21663
                                      0.70	0.21663
                                      0.80	0.21663
                                      0.85	0.21663
                                      0.90	0.21663
                                      0.95	0.21663
                                      1.00	0.21663
                                      1.05	0.21663
                                      1.10	0.21663
                                      1.20	0.21663
                                      1.30	0.21663
                                      1.40	0.21663
                                      1.60	0.22681
                                      1.80	0.26508
                                      2.00	0.30166
                                      2.20	0.33715
                                      2.40	0.37187
                                      2.60	0.40604
                                </tableData>
                            </table>
                        </product>
                    </difference>
                </product>
            </function>
            <function name="aero/coefficient/CDbeta">
                <description>Drag_due_to_beta</description>
                <product>
                    <property>aero/qbar-psf</property>
                    <property>metrics/Sw-sqft</property>
                    <property>aero/mag-beta-rad</property>
                    <property>aero/function/kCDge</property>
                      <table>
                          <independentVar>aero/alpha-rad</independentVar>
                          <tableData>
                              -0.3490	2.5954
                              -0.2620	3.2686
                              -0.1750	3.3563
                              -0.0870	3.0533
                              0.0000	3.8228
                              0.0700	4.3450
                              0.1400	4.1909
                              0.2090	3.7331
                              0.2790	3.1268
                              0.3490	2.8246
                              0.4190	2.4657
                              0.4890	2.2127
                              0.5590	1.9317
                              0.6980	1.2283
                              0.7850	0.9522
                              0.8730	0.7015
                          </tableData>
                      </table>
                </product>
            </function>
            <function name="aero/coefficient/CDDe">
                <description>Drag_due_to_Elevator_Deflection</description>
                <product>
                    <property>aero/qbar-psf</property>
                    <property>metrics/Sw-sqft</property>
                    <property>fcs/mag-elevator-pos-rad</property>
                    <value>0.0438</value>
                </product>
            </function>
            <function name="aero/coefficient/CDsb">
                <description>Drag_due_to_speedbrake</description>
                <product>
                    <property>aero/qbar-psf</property>
                    <property>metrics/Sw-sqft</property>
                    <property>fcs/speedbrake-pos-norm</property>
                    <value>0.0436</value>
                </product>
            </function>
        </axis>

        <axis name="SIDE">
            <function name="aero/coefficient/CYb">
                <description>Side_force_due_to_beta</description>
                <product>
                    <property>aero/qbar-psf</property>
                    <property>metrics/Sw-sqft</property>
                    <property>aero/beta-rad</property>
                      <table>
                          <independentVar>aero/alpha-rad</independentVar>
                          <tableData>
                              -0.3490	-0.8594
                              0.0700	-0.0974
                              0.5590	-0.0115
                              0.8730	-0.3552
                          </tableData>
                      </table>
                </product>
            </function>
            <function name="aero/coefficient/CYda">
                <description>Side_force_due_to_aileron</description>
                <product>
                    <property>aero/qbar-psf</property>
                    <property>metrics/Sw-sqft</property>
                    <property>fcs/left-aileron-pos-rad</property>
                    <value>-0.0012</value>
                </product>
            </function>
            <function name="aero/coefficient/CYdr">
                <description>Side_force_due_to_rudder</description>
                <product>
                    <property>aero/qbar-psf</property>
                    <property>metrics/Sw-sqft</property>
                    <property>fcs/rudder-pos-rad</property>
                    <value>0.3724</value>
                </product>
            </function>
        </axis>

        <axis name="LIFT">
            <function name="aero/coefficient/CLalpha">
                <description>Lift_due_to_alpha</description>
                <product>
                    <property>aero/qbar-psf</property>
                    <property>metrics/Sw-sqft</property>
                    <property>aero/function/kCLge</property>
                      <table>
                          <independentVar lookup="row">aero/alpha-rad</independentVar>
                          <independentVar lookup="column">velocities/mach</independentVar>
                          <tableData>
                              0.00	0.20	0.40	0.50	0.60	0.70	0.80	0.85	0.90	0.95	1.00	1.05	1.10	1.20	1.30	1.40	1.60	1.80	2.00	2.20	2.40	2.60
                              -0.3490	-0.8891	-0.8953	-0.9145	-0.9300	-0.9502	-0.9761	-1.0094	-1.0295	-1.0525	-1.0512	-1.0499	-1.0486	-1.0473	-1.0447	-1.0422	-1.0396	-0.8513	-0.7284	-0.6401	-0.5727	-0.5192	-0.4755
                              -0.2620	-0.8222	-0.8279	-0.8457	-0.8600	-0.8787	-0.9027	-0.9334	-0.9520	-0.9733	-0.9721	-0.9709	-0.9697	-0.9685	-0.9661	-0.9637	-0.9613	-0.7872	-0.6736	-0.5919	-0.5296	-0.4801	-0.4397
                              -0.1750	-0.5545	-0.5583	-0.5704	-0.5800	-0.5926	-0.6088	-0.6295	-0.6421	-0.6564	-0.6556	-0.6548	-0.6540	-0.6532	-0.6516	-0.6499	-0.6483	-0.5309	-0.4543	-0.3992	-0.3572	-0.3238	-0.2966
                              -0.0870	-0.2486	-0.2503	-0.2557	-0.2600	-0.2656	-0.2729	-0.2822	-0.2878	-0.2943	-0.2939	-0.2935	-0.2932	-0.2928	-0.2921	-0.2914	-0.2906	-0.2380	-0.2036	-0.1789	-0.1601	-0.1452	-0.1329
                              0.0000	0.0574	0.0578	0.0590	0.0600	0.0613	0.0630	0.0651	0.0664	0.0679	0.0678	0.0677	0.0677	0.0676	0.0674	0.0672	0.0671	0.0549	0.0470	0.0413	0.0369	0.0335	0.0307
                              0.0700	0.2868	0.2888	0.2950	0.3000	0.3065	0.3149	0.3256	0.3321	0.3395	0.3391	0.3387	0.3383	0.3379	0.3370	0.3362	0.3353	0.2746	0.2350	0.2065	0.1847	0.1675	0.1534
                              0.1400	0.5545	0.5583	0.5704	0.5800	0.5926	0.6088	0.6295	0.6421	0.6564	0.6556	0.6548	0.6540	0.6532	0.6516	0.6499	0.6483	0.5309	0.4543	0.3992	0.3572	0.3238	0.2966
                              0.2090	0.7457	0.7509	0.7670	0.7800	0.7969	0.8187	0.8466	0.8635	0.8828	0.8817	0.8806	0.8795	0.8784	0.8762	0.8741	0.8719	0.7140	0.6109	0.5368	0.4803	0.4355	0.3988
                              0.2790	0.8839	0.8900	0.9092	0.9245	0.9446	0.9704	1.0035	1.0235	1.0463	1.0451	1.0438	1.0425	1.0412	1.0386	1.0360	1.0335	0.8463	0.7241	0.6363	0.5693	0.5162	0.4727
                              0.3490	1.0279	1.0350	1.0573	1.0752	1.0985	1.1285	1.1670	1.1902	1.2168	1.2153	1.2138	1.2123	1.2108	1.2078	1.2048	1.2018	0.9842	0.8421	0.7400	0.6621	0.6003	0.5497
                              0.4190	1.1223	1.1300	1.1543	1.1739	1.1993	1.2321	1.2741	1.2995	1.3285	1.3269	1.3252	1.3236	1.3220	1.3187	1.3154	1.3121	1.0745	0.9194	0.8079	0.7228	0.6554	0.6002
                              0.4890	1.1719	1.1800	1.2054	1.2258	1.2524	1.2866	1.3305	1.3570	1.3873	1.3856	1.3839	1.3822	1.3804	1.3770	1.3736	1.3702	1.1220	0.9601	0.8436	0.7548	0.6844	0.6268
                              0.5590	1.2067	1.2150	1.2412	1.2622	1.2895	1.3248	1.3699	1.3972	1.4284	1.4267	1.4249	1.4232	1.4214	1.4179	1.4144	1.4108	1.1553	0.9885	0.8687	0.7772	0.7046	0.6454
                              0.6980	1.2415	1.2500	1.2769	1.2985	1.3267	1.3629	1.4094	1.4375	1.4696	1.4678	1.4660	1.4641	1.4623	1.4587	1.4551	1.4515	1.1886	1.0170	0.8937	0.7996	0.7249	0.6639
                              0.7850	1.1566	1.1645	1.1896	1.2097	1.2360	1.2697	1.3130	1.3392	1.3691	1.3674	1.3657	1.3640	1.3624	1.3590	1.3556	1.3522	1.1073	0.9475	0.8326	0.7449	0.6754	0.6185
                              0.8730	1.1141	1.1218	1.1460	1.1653	1.1906	1.2231	1.2648	1.2901	1.3189	1.3172	1.3156	1.3140	1.3124	1.3091	1.3059	1.3026	1.0667	0.9127	0.8020	0.7176	0.6506	0.5958
                          </tableData>
                      </table>
                </product>
            </function>
            <function name="aero/coefficient/CLDe">
                <description>Lift_due_to_Elevator_Deflection</description>
                <product>
                    <property>aero/qbar-psf</property>
                    <property>metrics/Sw-sqft</property>
                    <property>fcs/elevator-pos-rad</property>
                    <value>0.2865</value>
                </product>
            </function>
            <function name="aero/coefficient/CLadot">
                <description>Lift_due_to_alpha_rate</description>
                <product>
                    <property>aero/qbar-psf</property>
                    <property>metrics/Sw-sqft</property>
                    <property>aero/alphadot-rad_sec</property>
                    <property>aero/ci2vel</property>
                    <value>17.2232</value>
                </product>
            </function>
            <function name="aero/coefficient/CLq">
                <description>Lift_due_to_pitch_rate</description>
                <product>
                    <property>aero/qbar-psf</property>
                    <property>metrics/Sw-sqft</property>
                    <property>velocities/q-aero-rad_sec</property>
                    <property>aero/ci2vel</property>
                    <value>-17.2232</value>
                </product>
            </function>
        </axis>

        <axis name="ROLL">
            <function name="aero/coefficient/Clb">
                <description>Roll_moment_due_to_beta</description>
                <product>
                    <property>aero/qbar-psf</property>
                    <property>metrics/Sw-sqft</property>
                    <property>metrics/bw-ft</property>
                    <property>aero/beta-rad</property>
                      <table>
                          <independentVar>aero/alpha-rad</independentVar>
                          <tableData>
                              -0.3490	0.0286
                              -0.1750	-0.2292
                              0.0000	-0.0573
                              0.2090	-0.1719
                              0.3140	-0.1146
                              0.4190	-0.1719
                              0.6980	-0.0745
                              0.7850	-0.1146
                              0.8730	-0.1203
                          </tableData>
                      </table>
                </product>
            </function>
            <function name="aero/coefficient/Clp">
                <description>Roll_moment_due_to_roll_rate_(roll_damping)</description>
                <product>
                    <property>aero/qbar-psf</property>
                    <property>metrics/Sw-sqft</property>
                    <property>metrics/bw-ft</property>
                    <property>aero/bi2vel</property>
                    <property>velocities/p-aero-rad_sec</property>
                    <table>
                        <independentVar>aero/alpha-rad</independentVar>
                        <tableData>
                            0.0000  -0.4000
                            0.3490  -0.3100
                        </tableData>
                    </table>
                </product>
            </function>
            <function name="aero/coefficient/Clr">
                <description>Roll_moment_due_to_yaw_rate</description>
                <product>
                    <property>aero/qbar-psf</property>
                    <property>metrics/Sw-sqft</property>
                    <property>metrics/bw-ft</property>
                    <property>aero/bi2vel</property>
                    <property>velocities/r-aero-rad_sec</property>
                    <value>0.0001</value>
                </product>
            </function>
            <function name="aero/coefficient/ClDa">
                <description>Roll_moment_due_to_aileron</description>
                <product>
                    <property>aero/qbar-psf</property>
                    <property>metrics/Sw-sqft</property>
                    <property>metrics/bw-ft</property>
                    <property>fcs/left-aileron-pos-rad</property>
                      <table>
                          <independentVar>aero/alpha-rad</independentVar>
                          <tableData>
                              -0.3490	0.0172
                              -0.0870	0.0372
                              0.1400	0.0401
                              0.5590	0.0057
                              0.8730	0.0057
                          </tableData>
                      </table>
                </product>
            </function>
            <function name="aero/coefficient/ClDr">
                <description>Roll_moment_due_to_rudder</description>
                <product>
                    <property>aero/qbar-psf</property>
                    <property>metrics/Sw-sqft</property>
                    <property>metrics/bw-ft</property>
                    <property>fcs/rudder-pos-rad</property>
                    <value>0.0115</value>
                </product>
            </function>
        </axis>

        <axis name="PITCH">
            <function name="aero/coefficient/Cmalpha">
                <description>Pitch_moment_due_to_alpha</description>
                <product>
                    <property>aero/qbar-psf</property>
                    <property>metrics/Sw-sqft</property>
                    <property>metrics/cbarw-ft</property>
                    <property>aero/alpha-rad</property>
                    <property>aero/function/kCmge</property>
                      <table>
                          <independentVar>aero/alpha-rad</independentVar>
                          <tableData>
                              -0.3490	-0.1357
                              -0.2620	-0.0679
                              -0.1310	-0.0068
                              0.0000	-0.0272
                              0.2790	-0.0611
                              0.4190	-0.3867
                              0.5590	-0.2063
                              0.8730	-0.2321
                          </tableData>
                      </table>
                </product>
            </function>
            <function name="aero/coefficient/Cmadot">
                <description>Pitch_moment_due_to_alpha_rate</description>
                <product>
                    <property>aero/qbar-psf</property>
                    <property>metrics/Sw-sqft</property>
                    <property>metrics/cbarw-ft</property>
                    <property>aero/ci2vel</property>
                    <property>aero/alphadot-rad_sec</property>
                    <value>-11.8870</value>
                </product>
            </function>
            <function name="aero/coefficient/CmM">
                <description>Pitch_moment_due_to_Mach</description>
                <product>
                    <property>aero/qbar-psf</property>
                    <property>metrics/Sw-sqft</property>
                    <property>metrics/cbarw-ft</property>
                    <property>velocities/mach</property>
                    <value>-0.0000</value>
                </product>
            </function>
            <function name="aero/coefficient/Cmq">
                <description>Pitch_moment_due_to_pitch_rate</description>
                <product>
                    <property>aero/qbar-psf</property>
                    <property>metrics/Sw-sqft</property>
                    <property>metrics/cbarw-ft</property>
                    <property>aero/ci2vel</property>
                    <property>velocities/q-aero-rad_sec</property>
                    <value>-4.7000</value>
                </product>
            </function>
            <function name="aero/coefficient/Cmde">
                <description>Pitch_moment_due_to_elevator_deflection</description>
                <product>
                    <property>aero/qbar-psf</property>
                    <property>metrics/Sw-sqft</property>
                    <property>metrics/cbarw-ft</property>
                    <property>fcs/elevator-pos-rad</property>
                    <value>-0.4125</value>
                </product>
            </function>
        </axis>

        <axis name="YAW">
            <function name="aero/coefficient/Cnb">
                <description>Yaw_moment_due_to_beta</description>
                <product>
                    <property>aero/qbar-psf</property>
                    <property>metrics/Sw-sqft</property>
                    <property>metrics/bw-ft</property>
                    <property>aero/beta-rad</property>
                      <table>
                          <independentVar>aero/alpha-rad</independentVar>
                          <tableData>
                              -0.3490	0.0745
                              0.0000	0.1776
                              0.3490	0.0057
                              0.5240	-0.0974
                              0.8730	-0.0286
                          </tableData>
                      </table>
                </product>
            </function>
            <function name="aero/coefficient/Cnp">
                <description>Yaw_moment_due_to_roll_rate</description>
                <product>
                    <property>aero/qbar-psf</property>
                    <property>metrics/Sw-sqft</property>
                    <property>metrics/bw-ft</property>
                    <property>aero/bi2vel</property>
                    <property>velocities/p-aero-rad_sec</property>
                      <table>
                          <independentVar>aero/alpha-rad</independentVar>
                          <tableData>
                              -0.3490	0.1100
                              -0.0870	-0.1400
                              0.0000	-0.1000
                              0.2790	0.0100
                              0.4190	-0.1300
                              0.8730	-0.1800
                          </tableData>
                      </table>
                </product>
            </function>
            <function name="aero/coefficient/Cnr">
                <description>Yaw_moment_due_to_yaw_rate</description>
                <product>
                    <property>aero/qbar-psf</property>
                    <property>metrics/Sw-sqft</property>
                    <property>metrics/bw-ft</property>
                    <property>aero/bi2vel</property>
                    <property>velocities/r-aero-rad_sec</property>
                    <value>-0.4447</value>
                </product>
            </function>
            <function name="aero/coefficient/Cnda">
                <description>Yaw_moment_due_to_aileron</description>
                <product>
                    <property>aero/qbar-psf</property>
                    <property>metrics/Sw-sqft</property>
                    <property>metrics/bw-ft</property>
                    <property>fcs/left-aileron-pos-rad</property>
                    <value>0.0022</value>
                </product>
            </function>
            <function name="aero/coefficient/Cndr">
                <description>Yaw_moment_due_to_rudder</description>
                <product>
                    <property>aero/qbar-psf</property>
                    <property>metrics/Sw-sqft</property>
                    <property>metrics/bw-ft</property>
                    <property>fcs/rudder-pos-rad</property>
                      <table>
                          <independentVar>aero/alpha-rad</independentVar>
                          <tableData>
                              -0.3490	-0.0688
                              0.8730	-0.0115
                          </tableData>
                      </table>
                </product>
            </function>
        </axis>
    </aerodynamics>
</fdm_config>
