<?xml version="1.0"?>
<fdm_config name="Lockheed Martin F-35B" version="2.0" release="BETA">
    <fileheader>
        <!-- glideslope: written by tools/make_f35b.py, which says where each number
             comes from. Do not edit it by hand. -->
        <author>glideslope</author>
        <filecreationdate>2026-09-19</filecreationdate>
        <description>Lockheed Martin F-35B Lightning II, F135-PW-600</description>
    </fileheader>
    <metrics>
        <wingarea unit="FT2"> 460.0 </wingarea>
        <wingspan unit="FT"> 35.00 </wingspan>
        <chord unit="FT"> 15.25 </chord>
        <location name="AERORP" unit="IN">
            <x> 345.7 </x>
            <y> 0.0 </y>
            <z> 0.0 </z>
        </location>
        <location name="EYEPOINT" unit="IN">
            <x> 110.0 </x>
            <y> 0.0 </y>
            <z> 30.0 </z>
        </location>
        <location name="VRP" unit="IN">
            <x> 0.0 </x>
            <y> 0.0 </y>
            <z> 0.0 </z>
        </location>
    </metrics>
    <mass_balance>
        <ixx unit="SLUG*FT2"> 18007 </ixx>
        <iyy unit="SLUG*FT2"> 88004 </iyy>
        <izz unit="SLUG*FT2"> 100661 </izz>
        <ixz unit="SLUG*FT2"> 1568 </ixz>
        <emptywt unit="LBS"> 32300 </emptywt>
        <location name="CG" unit="IN">
            <x> 345.7 </x>
            <y> 0.0 </y>
            <z> 0.0 </z>
        </location>
        <pointmass name="Pilot">
            <weight unit="LBS"> 0 </weight>
            <location unit="IN">
                <x> 140.0 </x>
                <y> 0.0 </y>
                <z> 25.0 </z>
            </location>
        </pointmass>
        <pointmass name="Weapons">
            <weight unit="LBS"> 0 </weight>
            <location unit="IN">
                <x> 345.7 </x>
                <y> 0.0 </y>
                <z> -20.0 </z>
            </location>
        </pointmass>
    </mass_balance>
    <ground_reactions>
        <contact type="BOGEY" name="NOSE">
            <location unit="IN">
                <x> 150.0 </x>
                <y> 0.0 </y>
                <z> -70.0 </z>
            </location>
            <static_friction> 0.80 </static_friction>
            <dynamic_friction> 0.50 </dynamic_friction>
            <rolling_friction> 0.02 </rolling_friction>
            <spring_coeff unit="LBS/FT"> 10493 </spring_coeff>
            <damping_coeff unit="LBS/FT/SEC"> 2623 </damping_coeff>
            <max_steer unit="DEG"> 5 </max_steer>
            <brake_group> NONE </brake_group>
            <retractable>1</retractable>
        </contact>
        <contact type="BOGEY" name="LEFT_MAIN">
            <location unit="IN">
                <x> 364.5 </x>
                <y> -70.0 </y>
                <z> -70.0 </z>
            </location>
            <static_friction> 0.50 </static_friction>
            <dynamic_friction> 0.50 </dynamic_friction>
            <rolling_friction> 0.02 </rolling_friction>
            <spring_coeff unit="LBS/FT"> 54753 </spring_coeff>
            <damping_coeff unit="LBS/FT/SEC"> 13688 </damping_coeff>
            <max_steer unit="DEG"> 0 </max_steer>
            <brake_group> LEFT </brake_group>
            <retractable>1</retractable>
        </contact>
        <contact type="BOGEY" name="RIGHT_MAIN">
            <location unit="IN">
                <x> 364.5 </x>
                <y> 70.0 </y>
                <z> -70.0 </z>
            </location>
            <static_friction> 0.50 </static_friction>
            <dynamic_friction> 0.50 </dynamic_friction>
            <rolling_friction> 0.02 </rolling_friction>
            <spring_coeff unit="LBS/FT"> 54753 </spring_coeff>
            <damping_coeff unit="LBS/FT/SEC"> 13688 </damping_coeff>
            <max_steer unit="DEG"> 0 </max_steer>
            <brake_group> RIGHT </brake_group>
            <retractable>1</retractable>
        </contact>
        <contact type="STRUCTURE" name="NOSE">
            <location unit="IN">
                <x> 0.8 </x>
                <y> -0.0 </y>
                <z> 13.5 </z>
            </location>
            <static_friction> 0.4 </static_friction>
            <dynamic_friction> 0.4 </dynamic_friction>
            <spring_coeff unit="LBS/FT"> 240000 </spring_coeff>
            <damping_coeff unit="LBS/FT/SEC"> 42312 </damping_coeff>
        </contact>
        <contact type="STRUCTURE" name="BELLY_1">
            <location unit="IN">
                <x> 101.6 </x>
                <y> -0.0 </y>
                <z> -6.9 </z>
            </location>
            <static_friction> 0.4 </static_friction>
            <dynamic_friction> 0.4 </dynamic_friction>
            <spring_coeff unit="LBS/FT"> 240000 </spring_coeff>
            <damping_coeff unit="LBS/FT/SEC"> 42312 </damping_coeff>
        </contact>
        <contact type="STRUCTURE" name="BELLY_2">
            <location unit="IN">
                <x> 265.7 </x>
                <y> -12.8 </y>
                <z> -21.5 </z>
            </location>
            <static_friction> 0.4 </static_friction>
            <dynamic_friction> 0.4 </dynamic_friction>
            <spring_coeff unit="LBS/FT"> 240000 </spring_coeff>
            <damping_coeff unit="LBS/FT/SEC"> 42312 </damping_coeff>
        </contact>
        <contact type="STRUCTURE" name="BELLY_3">
            <location unit="IN">
                <x> 423.8 </x>
                <y> -0.0 </y>
                <z> -19.6 </z>
            </location>
            <static_friction> 0.4 </static_friction>
            <dynamic_friction> 0.4 </dynamic_friction>
            <spring_coeff unit="LBS/FT"> 240000 </spring_coeff>
            <damping_coeff unit="LBS/FT/SEC"> 42312 </damping_coeff>
        </contact>
        <contact type="STRUCTURE" name="LEFT_WING_TIP">
            <location unit="IN">
                <x> 450.4 </x>
                <y> -206.4 </y>
                <z> 24.9 </z>
            </location>
            <static_friction> 0.4 </static_friction>
            <dynamic_friction> 0.4 </dynamic_friction>
            <spring_coeff unit="LBS/FT"> 240000 </spring_coeff>
            <damping_coeff unit="LBS/FT/SEC"> 42312 </damping_coeff>
        </contact>
        <contact type="STRUCTURE" name="RIGHT_WING_TIP">
            <location unit="IN">
                <x> 450.4 </x>
                <y> 206.3 </y>
                <z> 24.9 </z>
            </location>
            <static_friction> 0.4 </static_friction>
            <dynamic_friction> 0.4 </dynamic_friction>
            <spring_coeff unit="LBS/FT"> 240000 </spring_coeff>
            <damping_coeff unit="LBS/FT/SEC"> 42312 </damping_coeff>
        </contact>
        <contact type="STRUCTURE" name="TAIL">
            <location unit="IN">
                <x> 531.8 </x>
                <y> -5.1 </y>
                <z> -1.8 </z>
            </location>
            <static_friction> 0.4 </static_friction>
            <dynamic_friction> 0.4 </dynamic_friction>
            <spring_coeff unit="LBS/FT"> 240000 </spring_coeff>
            <damping_coeff unit="LBS/FT/SEC"> 42312 </damping_coeff>
        </contact>
        <contact type="STRUCTURE" name="LEFT_TAIL_STRIKE">
            <location unit="IN">
                <x> 602.5 </x>
                <y> -38.4 </y>
                <z> 24.1 </z>
            </location>
            <static_friction> 0.4 </static_friction>
            <dynamic_friction> 0.4 </dynamic_friction>
            <spring_coeff unit="LBS/FT"> 240000 </spring_coeff>
            <damping_coeff unit="LBS/FT/SEC"> 42312 </damping_coeff>
        </contact>
        <contact type="STRUCTURE" name="RIGHT_TAIL_STRIKE">
            <location unit="IN">
                <x> 602.5 </x>
                <y> 38.4 </y>
                <z> 24.1 </z>
            </location>
            <static_friction> 0.4 </static_friction>
            <dynamic_friction> 0.4 </dynamic_friction>
            <spring_coeff unit="LBS/FT"> 240000 </spring_coeff>
            <damping_coeff unit="LBS/FT/SEC"> 42312 </damping_coeff>
        </contact>
    </ground_reactions>
    <propulsion>
        <engine file="F135-PW-600">
            <feed>0</feed>
            <feed>1</feed>
            <thruster file="direct">
                <location unit="IN">
                    <x> 560.0 </x>
                    <y> 0.0 </y>
                    <z> 0.0 </z>
                </location>
            </thruster>
        </engine>
        <tank type="FUEL">
            <location unit="IN">
                <x> 345.7 </x>
                <y> -40.0 </y>
                <z> 0.0 </z>
            </location>
            <capacity unit="LBS"> 6550 </capacity>
            <contents unit="LBS"> 6550 </contents>
        </tank>
        <tank type="FUEL">
            <location unit="IN">
                <x> 345.7 </x>
                <y> 40.0 </y>
                <z> 0.0 </z>
            </location>
            <capacity unit="LBS"> 6550 </capacity>
            <contents unit="LBS"> 6550 </contents>
        </tank>
    </propulsion>
    <flight_control name="F-35B">
        <channel name="Controls">
            <pure_gain name="Pitch Damper">
                <input>velocities/q-aero-rad_sec</input>
                <gain>1.0</gain>
                <clipto><min>-0.3</min><max>0.3</max></clipto>
            </pure_gain>
            <summer name="Elevator Sum">
                <input>fcs/elevator-cmd-norm</input>
                <input>fcs/pitch-trim-cmd-norm</input>
                <input>fcs/pitch-damper</input>
                <clipto><min>-1</min><max>1</max></clipto>
            </summer>
            <aerosurface_scale name="Elevator">
                <input>fcs/elevator-sum</input>
                <range><min>-0.4363</min><max>0.4363</max></range>
                <output>fcs/elevator-pos-rad</output>
            </aerosurface_scale>
            <summer name="Aileron Sum">
                <input>fcs/aileron-cmd-norm</input>
                <input>fcs/roll-trim-cmd-norm</input>
                <clipto><min>-1</min><max>1</max></clipto>
            </summer>
            <aerosurface_scale name="Aileron">
                <input>fcs/aileron-sum</input>
                <range><min>-0.4363</min><max>0.4363</max></range>
                <output>fcs/left-aileron-pos-rad</output>
            </aerosurface_scale>
            <pure_gain name="Right Aileron">
                <input>-fcs/left-aileron-pos-rad</input>
                <gain>1</gain>
                <output>fcs/right-aileron-pos-rad</output>
            </pure_gain>
            <washout_filter name="Yaw Rate Washout">
                <input>velocities/r-aero-rad_sec</input>
                <c1>0.5</c1>
            </washout_filter>
            <pure_gain name="Yaw Damper">
                <input>fcs/yaw-rate-washout</input>
                <gain>1.0</gain>
                <clipto><min>-0.2</min><max>0.2</max></clipto>
            </pure_gain>
            <summer name="Rudder Sum">
                <input>fcs/rudder-cmd-norm</input>
                <input>fcs/yaw-trim-cmd-norm</input>
                <input>fcs/yaw-damper</input>
                <clipto><min>-1</min><max>1</max></clipto>
            </summer>
            <aerosurface_scale name="Rudder">
                <input>fcs/rudder-sum</input>
                <range><min>-0.5236</min><max>0.5236</max></range>
                <output>fcs/rudder-pos-rad</output>
            </aerosurface_scale>
            <kinematic name="Gear">
                <input>gear/gear-cmd-norm</input>
                <traverse>
                    <setting>
                        <position> 0 </position>
                        <time> 0 </time>
                    </setting>
                    <setting>
                        <position> 1 </position>
                        <time> 5 </time>
                    </setting>
                </traverse>
                <output>gear/gear-pos-norm</output>
            </kinematic>
        </channel>
    </flight_control>
    <aerodynamics>
        <function name="aero/function/kCLge">
            <description>Change_in_lift_due_to_ground_effect</description>
            <table>
                <independentVar>aero/h_b-mac-ft</independentVar>
                <tableData>
                    0.0	1.203
                    0.1	1.127
                    0.15	1.09
                    0.2	1.073
                    0.3	1.046
                    0.4	1.055
                    0.5	1.019
                    0.6	1.013
                    0.7	1.008
                    0.8	1.006
                    0.9	1.003
                    1.0	1.002
                    1.1	1.0
                </tableData>
            </table>
        </function>
        <function name="aero/function/kCDge">
            <description>Change_in_drag_due_to_ground_effect</description>
            <table>
                <independentVar>aero/h_b-mac-ft</independentVar>
                <tableData>
                    0.0	0.48
                    0.1	0.515
                    0.15	0.629
                    0.2	0.709
                    0.3	0.815
                    0.4	0.882
                    0.5	0.928
                    0.6	0.962
                    0.7	0.988
                    0.8	1.0
                    0.9	1.0
                    1.0	1.0
                    1.1	1.0
                </tableData>
            </table>
        </function>
        <axis name="LIFT">
            <function name="aero/coefficient/CLalpha">
                <description>Lift_due_to_alpha</description>
                <product>
                    <property>aero/qbar-psf</property>
                    <property>metrics/Sw-sqft</property>
                    <property>aero/function/kCLge</property>
                    <table>
                        <independentVar lookup="row">aero/alpha-rad</independentVar>
                        <independentVar lookup="column">velocities/mach</independentVar>
                        <tableData>
                                	0.00	0.20	0.40	0.50	0.60	0.70	0.80	0.85	0.90	0.95	1.00	1.05	1.10	1.20	1.30	1.40	1.60	1.80	2.00	2.20	2.40	2.60
                            -0.6000	-0.8833	-0.8900	-0.9113	-0.9285	-0.9513	-0.9810	-1.0199	-1.0439	-1.0718	-1.0636	-1.0554	-1.0473	-1.0391	-1.0227	-1.0064	-0.9901	-0.8163	-0.7012	-0.6177	-0.5537	-0.5027	-0.4609
                            -0.3000	-0.8833	-0.8900	-0.9113	-0.9285	-0.9513	-0.9810	-1.0199	-1.0439	-1.0718	-1.0636	-1.0554	-1.0473	-1.0391	-1.0227	-1.0064	-0.9901	-0.8163	-0.7012	-0.6177	-0.5537	-0.5027	-0.4609
                            0.0000	0.0000	0.0000	0.0000	0.0000	0.0000	0.0000	0.0000	0.0000	0.0000	0.0000	0.0000	0.0000	0.0000	0.0000	0.0000	0.0000	0.0000	0.0000	0.0000	0.0000	0.0000	0.0000
                            0.3000	0.8833	0.8900	0.9113	0.9285	0.9513	0.9810	1.0199	1.0439	1.0718	1.0636	1.0554	1.0473	1.0391	1.0227	1.0064	0.9901	0.8163	0.7012	0.6177	0.5537	0.5027	0.4609
                            0.4250	1.1593	1.1681	1.1960	1.2187	1.2485	1.2875	1.3386	1.3701	1.4067	1.3960	1.3852	1.3745	1.3638	1.3423	1.3209	1.2994	1.0714	0.9203	0.8108	0.7267	0.6598	0.6049
                            0.5500	1.2513	1.2608	1.2910	1.3154	1.3476	1.3897	1.4448	1.4788	1.5183	1.5068	1.4952	1.4836	1.4720	1.4489	1.4257	1.4026	1.1565	0.9934	0.8751	0.7844	0.7121	0.6529
                            0.8000	1.0226	1.0303	1.0550	1.0750	1.1013	1.1357	1.1807	1.2085	1.2408	1.2314	1.2219	1.2124	1.2030	1.1841	1.1651	1.1462	0.9451	0.8118	0.7152	0.6410	0.5820	0.5336
                            1.2000	0.5318	0.5359	0.5487	0.5591	0.5728	0.5907	0.6141	0.6286	0.6454	0.6404	0.6355	0.6306	0.6257	0.6158	0.6060	0.5962	0.4916	0.4222	0.3720	0.3334	0.3027	0.2775
                            1.5700	0.0000	0.0000	0.0000	0.0000	0.0000	0.0000	0.0000	0.0000	0.0000	0.0000	0.0000	0.0000	0.0000	0.0000	0.0000	0.0000	0.0000	0.0000	0.0000	0.0000	0.0000	0.0000
                        </tableData>
                    </table>
                </product>
            </function>
            <function name="aero/coefficient/CLde">
                <description>Lift_due_to_stabilator</description>
                <product>
                    <property>aero/qbar-psf</property>
                    <property>metrics/Sw-sqft</property>
                    <property>fcs/elevator-pos-rad</property>
                    <value>0.24</value>
                </product>
            </function>
        </axis>
        <axis name="DRAG">
            <function name="aero/coefficient/CD0">
                <description>Drag_at_zero_lift</description>
                <product>
                    <property>aero/qbar-psf</property>
                    <property>metrics/Sw-sqft</property>
                    <table>
                        <independentVar>velocities/mach</independentVar>
                        <tableData>
                              0.00	0.02000
                              0.20	0.02000
                              0.40	0.02000
                              0.50	0.02000
                              0.60	0.02000
                              0.70	0.02000
                              0.80	0.02000
                              0.85	0.02000
                              0.90	0.02299
                              0.95	0.03071
                              1.00	0.04125
                              1.05	0.05275
                              1.10	0.06329
                              1.20	0.07400
                              1.30	0.06933
                              1.40	0.06537
                              1.60	0.05901
                              1.80	0.05415
                              2.00	0.05032
                              2.20	0.04722
                              2.40	0.04467
                              2.60	0.04254
                        </tableData>
                    </table>
                </product>
            </function>
            <function name="aero/coefficient/CDi">
                <description>Drag_due_to_lift</description>
                <product>
                    <property>aero/qbar-psf</property>
                    <property>metrics/Sw-sqft</property>
                    <property>aero/function/kCDge</property>
                    <property>aero/cl-squared</property>
                    <table>
                        <independentVar>velocities/mach</independentVar>
                        <tableData>
                              0.00	0.17076
                              0.20	0.17076
                              0.40	0.17076
                              0.50	0.17076
                              0.60	0.17076
                              0.70	0.17076
                              0.80	0.17076
                              0.85	0.17076
                              0.90	0.17076
                              0.95	0.17076
                              1.00	0.17076
                              1.05	0.17076
                              1.10	0.17076
                              1.20	0.17076
                              1.30	0.17076
                              1.40	0.19090
                              1.60	0.23152
                              1.80	0.26954
                              2.00	0.30596
                              2.20	0.34134
                              2.40	0.37598
                              2.60	0.41008
                        </tableData>
                    </table>
                </product>
            </function>
            <function name="aero/coefficient/CDseparated">
                <description>Drag_past_the_flow_separating</description>
                <product>
                    <property>aero/qbar-psf</property>
                    <property>metrics/Sw-sqft</property>
                    <table>
                        <independentVar>aero/alpha-rad</independentVar>
                        <tableData>
                              -1.5708	1.0
                              -0.5245	1.0
                              -0.3500	0.0
                              0.3500	0.0
                              0.5245	1.0
                              1.5708	1.0
                        </tableData>
                    </table>
                    <difference>
                        <product>
                            <pow><property>aero/cl-squared</property><value>0.5</value></pow>
                            <min><abs><tan><property>aero/alpha-rad</property></tan></abs><value>1.732</value></min>
                        </product>
                        <product>
                            <property>aero/cl-squared</property>
                            <table>
                                <independentVar>velocities/mach</independentVar>
                                <tableData>
                                      0.00	0.17076
                                      0.20	0.17076
                                      0.40	0.17076
                                      0.50	0.17076
                                      0.60	0.17076
                                      0.70	0.17076
                                      0.80	0.17076
                                      0.85	0.17076
                                      0.90	0.17076
                                      0.95	0.17076
                                      1.00	0.17076
                                      1.05	0.17076
                                      1.10	0.17076
                                      1.20	0.17076
                                      1.30	0.17076
                                      1.40	0.19090
                                      1.60	0.23152
                                      1.80	0.26954
                                      2.00	0.30596
                                      2.20	0.34134
                                      2.40	0.37598
                                      2.60	0.41008
                                </tableData>
                            </table>
                        </product>
                    </difference>
                </product>
            </function>
            <function name="aero/coefficient/CDgear">
                <description>Drag_due_to_gear</description>
                <product>
                    <property>aero/qbar-psf</property>
                    <property>metrics/Sw-sqft</property>
                    <property>gear/gear-pos-norm</property>
                    <value>0.02</value>
                </product>
            </function>
            <function name="aero/coefficient/CDbeta">
                <description>Drag_due_to_sideslip</description>
                <product>
                    <property>aero/qbar-psf</property>
                    <property>metrics/Sw-sqft</property>
                    <property>aero/mag-beta-rad</property>
                    <value>0.25</value>
                </product>
            </function>
            <function name="aero/coefficient/CDde">
                <description>Drag_due_to_stabilator</description>
                <product>
                    <property>aero/qbar-psf</property>
                    <property>metrics/Sw-sqft</property>
                    <property>fcs/mag-elevator-pos-rad</property>
                    <value>0.03</value>
                </product>
            </function>
        </axis>
        <axis name="SIDE">
            <function name="aero/coefficient/CYb">
                <description>Side_force_due_to_beta</description>
                <product>
                    <property>aero/qbar-psf</property>
                    <property>metrics/Sw-sqft</property>
                    <property>aero/beta-rad</property>
                    <value>-0.655</value>
                </product>
            </function>
            <function name="aero/coefficient/CYda">
                <description>Side_force_due_to_flaperons</description>
                <product>
                    <property>aero/qbar-psf</property>
                    <property>metrics/Sw-sqft</property>
                    <property>fcs/left-aileron-pos-rad</property>
                    <value>-0.071</value>
                </product>
            </function>
            <function name="aero/coefficient/CYdr">
                <description>Side_force_due_to_rudders</description>
                <product>
                    <property>aero/qbar-psf</property>
                    <property>metrics/Sw-sqft</property>
                    <property>fcs/rudder-pos-rad</property>
                    <value>0.124</value>
                </product>
            </function>
        </axis>
        <axis name="ROLL">
            <function name="aero/coefficient/Clb">
                <description>Roll_moment_due_to_beta</description>
                <product>
                    <property>aero/qbar-psf</property>
                    <property>metrics/Sw-sqft</property>
                    <property>metrics/bw-ft</property>
                    <property>aero/beta-rad</property>
                    <value>-0.156</value>
                </product>
            </function>
            <function name="aero/coefficient/Clp">
                <description>Roll_moment_due_to_roll_rate</description>
                <product>
                    <property>aero/qbar-psf</property>
                    <property>metrics/Sw-sqft</property>
                    <property>metrics/bw-ft</property>
                    <property>aero/bi2vel</property>
                    <property>velocities/p-aero-rad_sec</property>
                    <value>-0.272</value>
                </product>
            </function>
            <function name="aero/coefficient/Clr">
                <description>Roll_moment_due_to_yaw_rate</description>
                <product>
                    <property>aero/qbar-psf</property>
                    <property>metrics/Sw-sqft</property>
                    <property>metrics/bw-ft</property>
                    <property>aero/bi2vel</property>
                    <property>velocities/r-aero-rad_sec</property>
                    <value>0.205</value>
                </product>
            </function>
            <function name="aero/coefficient/Clda">
                <description>Roll_moment_due_to_flaperons</description>
                <product>
                    <property>aero/qbar-psf</property>
                    <property>metrics/Sw-sqft</property>
                    <property>metrics/bw-ft</property>
                    <property>fcs/left-aileron-pos-rad</property>
                    <value>0.114</value>
                </product>
            </function>
            <function name="aero/coefficient/Cldr">
                <description>Roll_moment_due_to_rudders</description>
                <product>
                    <property>aero/qbar-psf</property>
                    <property>metrics/Sw-sqft</property>
                    <property>metrics/bw-ft</property>
                    <property>fcs/rudder-pos-rad</property>
                    <value>-0.0009</value>
                </product>
            </function>
        </axis>
        <axis name="PITCH">
            <function name="aero/coefficient/Cmalpha">
                <description>Pitch_moment_due_to_alpha</description>
                <product>
                    <property>aero/qbar-psf</property>
                    <property>metrics/Sw-sqft</property>
                    <property>metrics/cbarw-ft</property>
                    <property>aero/alpha-rad</property>
                    <value>-0.098</value>
                </product>
            </function>
            <function name="aero/coefficient/Cmq">
                <description>Pitch_moment_due_to_pitch_rate</description>
                <product>
                    <property>aero/qbar-psf</property>
                    <property>metrics/Sw-sqft</property>
                    <property>metrics/cbarw-ft</property>
                    <property>aero/ci2vel</property>
                    <property>velocities/q-aero-rad_sec</property>
                    <value>-2</value>
                </product>
            </function>
            <function name="aero/coefficient/Cmadot">
                <description>Pitch_moment_due_to_alpha_rate</description>
                <product>
                    <property>aero/qbar-psf</property>
                    <property>metrics/Sw-sqft</property>
                    <property>metrics/cbarw-ft</property>
                    <property>aero/ci2vel</property>
                    <property>aero/alphadot-rad_sec</property>
                    <value>-0.95</value>
                </product>
            </function>
            <function name="aero/coefficient/Cmde">
                <description>Pitch_moment_due_to_stabilator</description>
                <product>
                    <property>aero/qbar-psf</property>
                    <property>metrics/Sw-sqft</property>
                    <property>metrics/cbarw-ft</property>
                    <property>fcs/elevator-pos-rad</property>
                    <value>-0.322</value>
                </product>
            </function>
        </axis>
        <axis name="YAW">
            <function name="aero/coefficient/Cnb">
                <description>Yaw_moment_due_to_beta</description>
                <product>
                    <property>aero/qbar-psf</property>
                    <property>metrics/Sw-sqft</property>
                    <property>metrics/bw-ft</property>
                    <property>aero/beta-rad</property>
                    <value>0.199</value>
                </product>
            </function>
            <function name="aero/coefficient/Cnp">
                <description>Yaw_moment_due_to_roll_rate</description>
                <product>
                    <property>aero/qbar-psf</property>
                    <property>metrics/Sw-sqft</property>
                    <property>metrics/bw-ft</property>
                    <property>aero/bi2vel</property>
                    <property>velocities/p-aero-rad_sec</property>
                    <value>-0.013</value>
                </product>
            </function>
            <function name="aero/coefficient/Cnr">
                <description>Yaw_moment_due_to_yaw_rate</description>
                <product>
                    <property>aero/qbar-psf</property>
                    <property>metrics/Sw-sqft</property>
                    <property>metrics/bw-ft</property>
                    <property>aero/bi2vel</property>
                    <property>velocities/r-aero-rad_sec</property>
                    <value>-0.32</value>
                </product>
            </function>
            <function name="aero/coefficient/Cnda">
                <description>Yaw_moment_due_to_flaperons</description>
                <product>
                    <property>aero/qbar-psf</property>
                    <property>metrics/Sw-sqft</property>
                    <property>metrics/bw-ft</property>
                    <property>fcs/left-aileron-pos-rad</property>
                    <value>-0.0082</value>
                </product>
            </function>
            <function name="aero/coefficient/Cndr">
                <description>Yaw_moment_due_to_rudders</description>
                <product>
                    <property>aero/qbar-psf</property>
                    <property>metrics/Sw-sqft</property>
                    <property>metrics/bw-ft</property>
                    <property>fcs/rudder-pos-rad</property>
                    <value>-0.072</value>
                </product>
            </function>
        </axis>
    </aerodynamics>
</fdm_config>
