<?xml version="1.0"?>
<fdm_config name="Gates Learjet 35A" version="2.0" release="BETA">
    <fileheader>
        <!-- glideslope: written by tools/make_learjet35a.py, which says where each
             number comes from. Do not edit it by hand. -->
        <author>glideslope</author>
        <filecreationdate>2026-09-19</filecreationdate>
        <description>Gates Learjet 35A, TFE731-2-2B</description>
    </fileheader>
    <metrics>
        <wingarea unit="FT2"> 253.6 </wingarea>
        <wingspan unit="FT"> 38.08 </wingspan>
        <chord unit="FT"> 6.896 </chord>
        <location name="AERORP" unit="IN">
            <x> 382.9 </x>
            <y> 0.0 </y>
            <z> 30.5 </z>
        </location>
        <location name="EYEPOINT" unit="IN">
            <x> 150.0 </x>
            <y> -12.0 </y>
            <z> 30.0 </z>
        </location>
        <location name="VRP" unit="IN">
            <x> 86.8 </x>
            <y> 0.0 </y>
            <z> 0.0 </z>
        </location>
    </metrics>
    <mass_balance>
        <ixx unit="SLUG*FT2"> 18776 </ixx>
        <iyy unit="SLUG*FT2"> 17268 </iyy>
        <izz unit="SLUG*FT2"> 36044 </izz>
        <ixz unit="SLUG*FT2"> 1802 </ixz>
        <emptywt unit="LBS"> 10173 </emptywt>
        <location name="CG" unit="IN">
            <x> 388.7 </x>
            <y> 0.0 </y>
            <z> 30.5 </z>
        </location>
        <pointmass name="Payload">
            <weight unit="LBS"> 0 </weight>
            <location unit="IN">
                <x> 300.0 </x>
                <y> 0.0 </y>
                <z> 26.0 </z>
            </location>
        </pointmass>
    </mass_balance>
    <ground_reactions>
        <contact type="BOGEY" name="NOSE">
            <location unit="IN">
                <x> 153.6 </x>
                <y> 0.0 </y>
                <z> -29.5 </z>
            </location>
            <static_friction> 0.80 </static_friction>
            <dynamic_friction> 0.50 </dynamic_friction>
            <rolling_friction> 0.02 </rolling_friction>
            <spring_coeff unit="LBS/FT"> 5303 </spring_coeff>
            <damping_coeff unit="LBS/FT/SEC"> 1392 </damping_coeff>
            <max_steer unit="DEG"> 5 </max_steer>
            <brake_group> NONE </brake_group>
            <retractable>1</retractable>
        </contact>
        <contact type="BOGEY" name="LEFT_MAIN">
            <location unit="IN">
                <x> 396.8 </x>
                <y> -49.5 </y>
                <z> -28.2 </z>
            </location>
            <static_friction> 0.50 </static_friction>
            <dynamic_friction> 0.50 </dynamic_friction>
            <rolling_friction> 0.02 </rolling_friction>
            <spring_coeff unit="LBS/FT"> 40920 </spring_coeff>
            <damping_coeff unit="LBS/FT/SEC"> 10741 </damping_coeff>
            <max_steer unit="DEG"> 0 </max_steer>
            <brake_group> LEFT </brake_group>
            <retractable>1</retractable>
        </contact>
        <contact type="BOGEY" name="RIGHT_MAIN">
            <location unit="IN">
                <x> 396.8 </x>
                <y> 49.5 </y>
                <z> -28.2 </z>
            </location>
            <static_friction> 0.50 </static_friction>
            <dynamic_friction> 0.50 </dynamic_friction>
            <rolling_friction> 0.02 </rolling_friction>
            <spring_coeff unit="LBS/FT"> 40920 </spring_coeff>
            <damping_coeff unit="LBS/FT/SEC"> 10741 </damping_coeff>
            <max_steer unit="DEG"> 0 </max_steer>
            <brake_group> RIGHT </brake_group>
            <retractable>1</retractable>
        </contact>
        <contact type="STRUCTURE" name="LEFT_TIP_TANK">
            <location unit="IN">
                <x> 385.6 </x>
                <y> -228.5 </y>
                <z> 7.0 </z>
            </location>
            <static_friction> 1.0 </static_friction>
            <dynamic_friction> 1.0 </dynamic_friction>
            <spring_coeff unit="LBS/FT"> 18300 </spring_coeff>
            <damping_coeff unit="LBS/FT/SEC"> 3660 </damping_coeff>
        </contact>
        <contact type="STRUCTURE" name="RIGHT_TIP_TANK">
            <location unit="IN">
                <x> 385.6 </x>
                <y> 228.5 </y>
                <z> 7.0 </z>
            </location>
            <static_friction> 1.0 </static_friction>
            <dynamic_friction> 1.0 </dynamic_friction>
            <spring_coeff unit="LBS/FT"> 18300 </spring_coeff>
            <damping_coeff unit="LBS/FT/SEC"> 3660 </damping_coeff>
        </contact>
        <contact type="STRUCTURE" name="VENTRAL_FIN">
            <location unit="IN">
                <x> 596.2 </x>
                <y> 0.0 </y>
                <z> 21.6 </z>
            </location>
            <static_friction> 1.0 </static_friction>
            <dynamic_friction> 1.0 </dynamic_friction>
            <spring_coeff unit="LBS/FT"> 18300 </spring_coeff>
            <damping_coeff unit="LBS/FT/SEC"> 3660 </damping_coeff>
        </contact>
    </ground_reactions>
    <propulsion>
        <engine file="TFE731-2">
            <feed>0</feed>
            <feed>1</feed>
            <feed>2</feed>
            <feed>3</feed>
            <feed>4</feed>
            <thruster file="direct">
                <location unit="IN">
                    <x> 470.0 </x>
                    <y> -47.5 </y>
                    <z> 48.0 </z>
                </location>
            </thruster>
        </engine>
        <engine file="TFE731-2">
            <feed>0</feed>
            <feed>1</feed>
            <feed>2</feed>
            <feed>3</feed>
            <feed>4</feed>
            <thruster file="direct">
                <location unit="IN">
                    <x> 470.0 </x>
                    <y> 47.5 </y>
                    <z> 48.0 </z>
                </location>
            </thruster>
        </engine>
        <tank type="FUEL">
            <location unit="IN">
                <x> 385.6 </x>
                <y> -228.5 </y>
                <z> 19.0 </z>
            </location>
            <capacity unit="LBS"> 1196 </capacity>
            <contents unit="LBS"> 1196 </contents>
        </tank>
        <tank type="FUEL">
            <location unit="IN">
                <x> 385.6 </x>
                <y> 228.5 </y>
                <z> 19.0 </z>
            </location>
            <capacity unit="LBS"> 1196 </capacity>
            <contents unit="LBS"> 1196 </contents>
        </tank>
        <tank type="FUEL">
            <location unit="IN">
                <x> 385.8 </x>
                <y> -90.0 </y>
                <z> 16.0 </z>
            </location>
            <capacity unit="LBS"> 1253 </capacity>
            <contents unit="LBS"> 1253 </contents>
        </tank>
        <tank type="FUEL">
            <location unit="IN">
                <x> 385.8 </x>
                <y> 90.0 </y>
                <z> 16.0 </z>
            </location>
            <capacity unit="LBS"> 1253 </capacity>
            <contents unit="LBS"> 1253 </contents>
        </tank>
        <tank type="FUEL">
            <location unit="IN">
                <x> 440.2 </x>
                <y> 0.0 </y>
                <z> 20.0 </z>
            </location>
            <capacity unit="LBS"> 1340 </capacity>
            <contents unit="LBS"> 1340 </contents>
        </tank>
    </propulsion>
    <flight_control name="Learjet 35A">
        <channel name="Controls">
            <summer name="Elevator Sum">
                <input>fcs/elevator-cmd-norm</input>
                <clipto><min>-1</min><max>1</max></clipto>
            </summer>
            <aerosurface_scale name="Elevator">
                <input>fcs/elevator-sum</input>
                <range><min>-0.2793</min><max>0.2618</max></range>
                <output>fcs/elevator-pos-rad</output>
            </aerosurface_scale>
            <kinematic name="Stabilizer Trim">
                <input>fcs/pitch-trim-cmd-norm</input>
                <traverse>
                    <setting>
                        <position> -1 </position>
                        <time> 0 </time>
                    </setting>
                    <setting>
                        <position> 1 </position>
                        <time> 16.0 </time>
                    </setting>
                </traverse>
                <output>fcs/stabilizer-trim-norm</output>
            </kinematic>
            <aerosurface_scale name="Stabilizer">
                <input>fcs/stabilizer-trim-norm</input>
                <range><min>-0.0899</min><max>0.0330</max></range>
                <output>fcs/stabilizer-pos-rad</output>
            </aerosurface_scale>
            <fcs_function name="Pitch Trim Takeoff Norm">
                <function>
                    <table>
                        <independentVar>inertia/cg-x-in</independentVar>
                        <tableData>
                            366.31	0.7767
                            378.72	0.6990
                            385.34	0.2718
                            387.00	0.2718
                        </tableData>
                    </table>
                </function>
            </fcs_function>
            <summer name="Aileron Sum">
                <input>fcs/aileron-cmd-norm</input>
                <input>fcs/roll-trim-cmd-norm</input>
                <clipto><min>-1</min><max>1</max></clipto>
            </summer>
            <aerosurface_scale name="Aileron">
                <input>fcs/aileron-sum</input>
                <range><min>-0.3142</min><max>0.3142</max></range>
                <output>fcs/left-aileron-pos-rad</output>
            </aerosurface_scale>
            <pure_gain name="Right Aileron">
                <input>-fcs/left-aileron-pos-rad</input>
                <gain>1</gain>
                <output>fcs/right-aileron-pos-rad</output>
            </pure_gain>
            <washout_filter name="Yaw Rate Washout">
                <input>velocities/r-aero-rad_sec</input>
                <c1>0.5</c1>
            </washout_filter>
            <pure_gain name="Yaw Damper">
                <input>fcs/yaw-rate-washout</input>
                <gain>1.0</gain>
                <clipto><min>-0.2</min><max>0.2</max></clipto>
            </pure_gain>
            <summer name="Rudder Sum">
                <input>fcs/rudder-cmd-norm</input>
                <input>fcs/yaw-trim-cmd-norm</input>
                <input>fcs/yaw-damper</input>
                <clipto><min>-1</min><max>1</max></clipto>
            </summer>
            <aerosurface_scale name="Rudder">
                <input>fcs/rudder-sum</input>
                <range><min>-0.5236</min><max>0.5236</max></range>
                <output>fcs/rudder-pos-rad</output>
            </aerosurface_scale>
            <kinematic name="Flaps">
                <input>fcs/flap-cmd-norm</input>
                <traverse>
                    <setting>
                        <position> 0 </position>
                        <time> 0 </time>
                    </setting>
                    <setting>
                        <position> 8 </position>
                        <time> 3 </time>
                    </setting>
                    <setting>
                        <position> 20 </position>
                        <time> 4 </time>
                    </setting>
                    <setting>
                        <position> 40 </position>
                        <time> 6 </time>
                    </setting>
                </traverse>
                <output>fcs/flap-pos-deg</output>
            </kinematic>
            <kinematic name="Gear">
                <input>gear/gear-cmd-norm</input>
                <traverse>
                    <setting>
                        <position> 0 </position>
                        <time> 0 </time>
                    </setting>
                    <setting>
                        <position> 1 </position>
                        <time> 5 </time>
                    </setting>
                </traverse>
                <output>gear/gear-pos-norm</output>
            </kinematic>
            <kinematic name="Spoilers">
                <input>fcs/speedbrake-cmd-norm</input>
                <traverse>
                    <setting>
                        <position> 0 </position>
                        <time> 0 </time>
                    </setting>
                    <setting>
                        <position> 1 </position>
                        <time> 2 </time>
                    </setting>
                </traverse>
                <output>fcs/speedbrake-pos-norm</output>
            </kinematic>
        </channel>
    </flight_control>
    <aerodynamics>
        <function name="aero/function/kCLge">
            <description>Change_in_lift_due_to_ground_effect</description>
            <table>
                <independentVar>aero/h_b-mac-ft</independentVar>
                <tableData>
                    0.0	1.203
                    0.1	1.127
                    0.15	1.09
                    0.2	1.073
                    0.3	1.046
                    0.4	1.055
                    0.5	1.019
                    0.6	1.013
                    0.7	1.008
                    0.8	1.006
                    0.9	1.003
                    1.0	1.002
                    1.1	1.0
                </tableData>
            </table>
        </function>
        <function name="aero/function/kCDge">
            <description>Change_in_drag_due_to_ground_effect</description>
            <table>
                <independentVar>aero/h_b-mac-ft</independentVar>
                <tableData>
                    0.0	0.48
                    0.1	0.515
                    0.15	0.629
                    0.2	0.709
                    0.3	0.815
                    0.4	0.882
                    0.5	0.928
                    0.6	0.962
                    0.7	0.988
                    0.8	1.0
                    0.9	1.0
                    1.0	1.0
                    1.1	1.0
                </tableData>
            </table>
        </function>
        <axis name="LIFT">
            <function name="aero/coefficient/CLalpha">
                <description>Lift_due_to_alpha_and_flaps</description>
                <product>
                    <property>aero/qbar-psf</property>
                    <property>metrics/Sw-sqft</property>
                    <property>aero/function/kCLge</property>
                    <table>
                        <independentVar lookup="row">aero/alpha-rad</independentVar>
                        <independentVar lookup="column">fcs/flap-pos-deg</independentVar>
                        <tableData>
                                	0	8	20	40
                            -1.5700	0.0000	0.0000	0.0000	0.0000
                            -0.3000	-1.4250	-1.3050	-1.1250	-0.9050
                            0.0000	0.1110	0.2310	0.4110	0.6310
                            0.2248	1.2620	1.3820	1.5620	1.7820
                            0.2510	1.1703	1.5161	1.6961	1.9159
                            0.2518	1.1675	1.5202	1.6999	1.9131
                            0.2617	1.1329	1.5709	1.6652	1.8785
                            0.3248	0.9120	1.3502	1.4444	1.6576
                            0.3510	0.9013	1.2585	1.3527	1.5659
                            0.3518	0.9010	1.2557	1.3499	1.5635
                            0.3617	0.8970	1.2211	1.3280	1.5330
                            0.6000	0.8000	0.8000	0.8000	0.8000
                            1.5700	0.0000	0.0000	0.0000	0.0000
                        </tableData>
                    </table>
                </product>
            </function>
            <function name="aero/coefficient/CLq">
                <description>Lift_due_to_pitch_rate</description>
                <product>
                    <property>aero/qbar-psf</property>
                    <property>metrics/Sw-sqft</property>
                    <property>aero/ci2vel</property>
                    <property>velocities/q-aero-rad_sec</property>
                    <value>7</value>
                </product>
            </function>
            <function name="aero/coefficient/CLde">
                <description>Lift_due_to_elevator</description>
                <product>
                    <property>aero/qbar-psf</property>
                    <property>metrics/Sw-sqft</property>
                    <property>fcs/elevator-pos-rad</property>
                    <value>0.342</value>
                </product>
            </function>
            <function name="aero/coefficient/CLstab">
                <description>Lift_due_to_stabilizer</description>
                <product>
                    <property>aero/qbar-psf</property>
                    <property>metrics/Sw-sqft</property>
                    <property>fcs/stabilizer-pos-rad</property>
                    <value>0.69654</value>
                </product>
            </function>
            <function name="aero/coefficient/CLspoilers">
                <description>Lift_lost_to_spoilers</description>
                <product>
                    <property>aero/qbar-psf</property>
                    <property>metrics/Sw-sqft</property>
                    <property>fcs/speedbrake-pos-norm</property>
                    <value>-0.15</value>
                </product>
            </function>
        </axis>
        <axis name="DRAG">
            <function name="aero/coefficient/CD0">
                <description>Drag_at_zero_lift</description>
                <product>
                    <property>aero/qbar-psf</property>
                    <property>metrics/Sw-sqft</property>
                    <table>
                        <independentVar>aero/alpha-rad</independentVar>
                        <tableData>
                            -1.57	1.5
                            -0.26	0.05
                            0.0	0.021
                            0.22	0.021
                            0.35	0.1
                            1.57	1.6
                        </tableData>
                    </table>
                </product>
            </function>
            <function name="aero/coefficient/CDi">
                <description>Induced_drag</description>
                <product>
                    <property>aero/qbar-psf</property>
                    <property>metrics/Sw-sqft</property>
                    <property>aero/cl-squared</property>
                    <property>aero/function/kCDge</property>
                    <value>0.061422</value>
                </product>
            </function>
            <function name="aero/coefficient/CDflaps">
                <description>Drag_due_to_flaps</description>
                <product>
                    <property>aero/qbar-psf</property>
                    <property>metrics/Sw-sqft</property>
                    <table>
                        <independentVar>fcs/flap-pos-deg</independentVar>
                        <tableData>
                            0	0.0
                            8	0.01
                            20	0.03
                            40	0.08
                        </tableData>
                    </table>
                </product>
            </function>
            <function name="aero/coefficient/CDgear">
                <description>Drag_due_to_gear</description>
                <product>
                    <property>aero/qbar-psf</property>
                    <property>metrics/Sw-sqft</property>
                    <property>gear/gear-pos-norm</property>
                    <value>0.02</value>
                </product>
            </function>
            <function name="aero/coefficient/CDmach">
                <description>Drag_due_to_mach</description>
                <product>
                    <property>aero/qbar-psf</property>
                    <property>metrics/Sw-sqft</property>
                    <table>
                        <independentVar>velocities/mach</independentVar>
                        <tableData>
                            0.000	0.00000
                            0.662	0.00000
                            0.670	0.00000
                            0.680	0.00000
                            0.690	0.00001
                            0.700	0.00004
                            0.710	0.00010
                            0.720	0.00022
                            0.730	0.00042
                            0.740	0.00073
                            0.750	0.00118
                            0.760	0.00182
                            0.770	0.00269
                            0.780	0.00384
                            0.790	0.00532
                            0.800	0.00720
                            0.810	0.00952
                            0.820	0.01238
                            0.830	0.01583
                            0.840	0.01995
                            0.850	0.02484
                            0.860	0.03057
                            0.870	0.03724
                            0.880	0.04494
                            0.890	0.05378
                            0.900	0.06387
                            0.910	0.07532
                            0.920	0.08823
                            0.930	0.10275
                            0.940	0.11898
                            0.950	0.13706
                            0.960	0.15713
                            0.970	0.17933
                            0.980	0.20381
                            0.990	0.23070
                            1.000	0.26018
                        </tableData>
                    </table>
                </product>
            </function>
            <function name="aero/coefficient/CDspoilers">
                <description>Drag_due_to_spoilers</description>
                <product>
                    <property>aero/qbar-psf</property>
                    <property>metrics/Sw-sqft</property>
                    <property>fcs/speedbrake-pos-norm</property>
                    <value>0.0168</value>
                </product>
            </function>
            <function name="aero/coefficient/CDbeta">
                <description>Drag_due_to_sideslip</description>
                <product>
                    <property>aero/qbar-psf</property>
                    <property>metrics/Sw-sqft</property>
                    <property>aero/mag-beta-rad</property>
                    <value>0.25</value>
                </product>
            </function>
            <function name="aero/coefficient/CDde">
                <description>Drag_due_to_elevator</description>
                <product>
                    <property>aero/qbar-psf</property>
                    <property>metrics/Sw-sqft</property>
                    <property>fcs/mag-elevator-pos-rad</property>
                    <value>0.03</value>
                </product>
            </function>
            <function name="aero/coefficient/CDwindmill">
                <description>Drag_of_windmilling_engines</description>
                <product>
                    <property>aero/qbar-psf</property>
                    <value>1.626</value>
                    <sum>
                        <difference><value>1</value><property>propulsion/engine[0]/set-running</property></difference>
                        <difference><value>1</value><property>propulsion/engine[1]/set-running</property></difference>
                    </sum>
                </product>
            </function>
        </axis>
        <axis name="SIDE">
            <function name="aero/coefficient/CYb">
                <description>Side_force_due_to_beta</description>
                <product>
                    <property>aero/qbar-psf</property>
                    <property>metrics/Sw-sqft</property>
                    <property>aero/beta-rad</property>
                    <value>-0.76</value>
                </product>
            </function>
            <function name="aero/coefficient/CYdr">
                <description>Side_force_due_to_rudder</description>
                <product>
                    <property>aero/qbar-psf</property>
                    <property>metrics/Sw-sqft</property>
                    <property>fcs/rudder-pos-rad</property>
                    <value>0.14</value>
                </product>
            </function>
        </axis>
        <axis name="ROLL">
            <function name="aero/coefficient/Clb">
                <description>Roll_moment_due_to_beta</description>
                <product>
                    <property>aero/qbar-psf</property>
                    <property>metrics/Sw-sqft</property>
                    <property>metrics/bw-ft</property>
                    <property>aero/beta-rad</property>
                    <table>
                        <independentVar>aero/alpha-rad</independentVar>
                        <tableData>
                            0.0	-0.097
                            0.14	-0.12
                            0.244	-0.149
                        </tableData>
                    </table>
                </product>
            </function>
            <function name="aero/coefficient/Clp">
                <description>Roll_moment_due_to_roll_rate</description>
                <product>
                    <property>aero/qbar-psf</property>
                    <property>metrics/Sw-sqft</property>
                    <property>metrics/bw-ft</property>
                    <property>aero/bi2vel</property>
                    <property>velocities/p-aero-rad_sec</property>
                    <value>-0.5</value>
                </product>
            </function>
            <function name="aero/coefficient/Clr">
                <description>Roll_moment_due_to_yaw_rate</description>
                <product>
                    <property>aero/qbar-psf</property>
                    <property>metrics/Sw-sqft</property>
                    <property>metrics/bw-ft</property>
                    <property>aero/bi2vel</property>
                    <property>velocities/r-aero-rad_sec</property>
                    <value>0.1</value>
                </product>
            </function>
            <function name="aero/coefficient/Clda">
                <description>Roll_moment_due_to_ailerons</description>
                <product>
                    <property>aero/qbar-psf</property>
                    <property>metrics/Sw-sqft</property>
                    <property>metrics/bw-ft</property>
                    <property>fcs/left-aileron-pos-rad</property>
                    <value>0.16</value>
                </product>
            </function>
            <function name="aero/coefficient/Cldr">
                <description>Roll_moment_due_to_rudder</description>
                <product>
                    <property>aero/qbar-psf</property>
                    <property>metrics/Sw-sqft</property>
                    <property>metrics/bw-ft</property>
                    <property>fcs/rudder-pos-rad</property>
                    <value>0.02</value>
                </product>
            </function>
        </axis>
        <axis name="PITCH">
            <function name="aero/coefficient/Cm0">
                <description>Pitch_moment_at_zero_lift</description>
                <product>
                    <property>aero/qbar-psf</property>
                    <property>metrics/Sw-sqft</property>
                    <property>metrics/cbarw-ft</property>
                    <value>0.066</value>
                </product>
            </function>
            <function name="aero/coefficient/Cmalpha">
                <description>Pitch_moment_due_to_alpha</description>
                <product>
                    <property>aero/qbar-psf</property>
                    <property>metrics/Sw-sqft</property>
                    <property>metrics/cbarw-ft</property>
                    <property>aero/alpha-rad</property>
                    <value>-0.81</value>
                </product>
            </function>
            <function name="aero/coefficient/Cmq">
                <description>Pitch_moment_due_to_pitch_rate</description>
                <product>
                    <property>aero/qbar-psf</property>
                    <property>metrics/Sw-sqft</property>
                    <property>metrics/cbarw-ft</property>
                    <property>aero/ci2vel</property>
                    <property>velocities/q-aero-rad_sec</property>
                    <value>-16.46</value>
                </product>
            </function>
            <function name="aero/coefficient/Cmadot">
                <description>Pitch_moment_due_to_alpha_rate</description>
                <product>
                    <property>aero/qbar-psf</property>
                    <property>metrics/Sw-sqft</property>
                    <property>metrics/cbarw-ft</property>
                    <property>aero/ci2vel</property>
                    <property>aero/alphadot-rad_sec</property>
                    <value>-5</value>
                </product>
            </function>
            <function name="aero/coefficient/Cmde">
                <description>Pitch_moment_due_to_elevator</description>
                <product>
                    <property>aero/qbar-psf</property>
                    <property>metrics/Sw-sqft</property>
                    <property>metrics/cbarw-ft</property>
                    <property>fcs/elevator-pos-rad</property>
                    <value>-1.036</value>
                </product>
            </function>
            <function name="aero/coefficient/Cmstab">
                <description>Pitch_moment_due_to_stabilizer</description>
                <product>
                    <property>aero/qbar-psf</property>
                    <property>metrics/Sw-sqft</property>
                    <property>metrics/cbarw-ft</property>
                    <property>fcs/stabilizer-pos-rad</property>
                    <value>-2.11</value>
                </product>
            </function>
            <function name="aero/coefficient/Cmflaps">
                <description>Pitch_moment_due_to_flaps</description>
                <product>
                    <property>aero/qbar-psf</property>
                    <property>metrics/Sw-sqft</property>
                    <property>metrics/cbarw-ft</property>
                    <table>
                        <independentVar>fcs/flap-pos-deg</independentVar>
                        <tableData>
                            0	-0.0
                            8	-0.006
                            20	-0.015
                            40	-0.03
                        </tableData>
                    </table>
                </product>
            </function>
        </axis>
        <axis name="YAW">
            <function name="aero/coefficient/Cnb">
                <description>Yaw_moment_due_to_beta</description>
                <product>
                    <property>aero/qbar-psf</property>
                    <property>metrics/Sw-sqft</property>
                    <property>metrics/bw-ft</property>
                    <property>aero/beta-rad</property>
                    <table>
                        <independentVar>aero/alpha-rad</independentVar>
                        <tableData>
                            0.0	0.143
                            0.14	0.143
                            0.244	0.166
                        </tableData>
                    </table>
                </product>
            </function>
            <function name="aero/coefficient/Cnp">
                <description>Yaw_moment_due_to_roll_rate</description>
                <product>
                    <property>aero/qbar-psf</property>
                    <property>metrics/Sw-sqft</property>
                    <property>metrics/bw-ft</property>
                    <property>aero/bi2vel</property>
                    <property>velocities/p-aero-rad_sec</property>
                    <value>-0.03</value>
                </product>
            </function>
            <function name="aero/coefficient/Cnr">
                <description>Yaw_moment_due_to_yaw_rate</description>
                <product>
                    <property>aero/qbar-psf</property>
                    <property>metrics/Sw-sqft</property>
                    <property>metrics/bw-ft</property>
                    <property>aero/bi2vel</property>
                    <property>velocities/r-aero-rad_sec</property>
                    <value>-0.18</value>
                </product>
            </function>
            <function name="aero/coefficient/Cndr">
                <description>Yaw_moment_due_to_rudder</description>
                <product>
                    <property>aero/qbar-psf</property>
                    <property>metrics/Sw-sqft</property>
                    <property>metrics/bw-ft</property>
                    <property>fcs/rudder-pos-rad</property>
                    <value>-0.0745</value>
                </product>
            </function>
        </axis>
    </aerodynamics>
</fdm_config>
