<?xml version="1.0"?>
<!--
  File:     CFM56_5.xml
  Author:   Aero-Matic v 0.8

  Inputs:
    name:           CFM56
    type:           turbine
    thrust:         20000 lb
    augmented?      no
    injected?       no
-->

<turbine_engine name="CFM56">
  <!-- glideslope: JSBSim's CFM56 with the changes listed in
       tools/make_737_300.py, which made it. Do not edit it by hand. -->
  <milthrust> 20000.0 </milthrust>
  <bypassratio>     5.9 </bypassratio>
  <tsfc>            0.657 </tsfc>
  <bleed>           0.00 </bleed>
  <idlen1>         30.0 </idlen1>
  <idlen2>         60.0 </idlen2>
  <maxn1>         100.0 </maxn1>
  <maxn2>         100.0 </maxn2>
  <augmented>         0 </augmented>
  <injected>          0 </injected>

  <function name="IdleThrust">
   <table>
    <independentVar lookup="row">velocities/mach</independentVar>
    <independentVar lookup="column">atmosphere/density-altitude</independentVar>
    <tableData>
         -10000     0     10000   20000   30000   40000   50000   60000
     0.0  0.0420  0.0436  0.0528  0.0694  0.0899  0.1183  0.1467  0.0
     0.2  0.0500  0.0501  0.0335  0.0544  0.0797  0.1049  0.1342  0.0
     0.4  0.0040  0.0047  0.0020  0.0272  0.0595  0.0891  0.1203  0.0
     0.6  0.0     0.0     0.0     0.0     0.0276  0.0718  0.1073  0.0
     0.8  0.0     0.0     0.0     0.0     0.0174  0.0468  0.0900  0.0
     1.0  0.0     0.0     0.0     0.0     0.0     0.0422  0.0700  0.0
    </tableData>
   </table>
  </function>

  <function name="MilThrust">
   <table>
    <independentVar lookup="row">velocities/mach</independentVar>
    <independentVar lookup="column">atmosphere/density-altitude</independentVar>
    <tableData>
          -10000       0   10000   20000   30000   40000   50000   60000
     0.0  1.4183  1.0000  0.6877  0.4595  0.2970  0.1851  0.1145  0.0708
     0.2  1.1389  0.8029  0.5522  0.3690  0.2384  0.1486  0.0919  0.0568
     0.4  1.0929  0.7705  0.5299  0.3541  0.2288  0.1426  0.0882  0.0545
     0.6  1.1225  0.7914  0.5442  0.3637  0.2350  0.1465  0.0906  0.0560
     0.8  1.2145  0.8563  0.5889  0.3935  0.2543  0.1585  0.0980  0.0606
     1.0  1.3693  0.9654  0.6639  0.4436  0.2867  0.1787  0.1105  0.0683
     1.2  0.0000  0.0000  0.0000  0.0000  0.0000  0.0000  0.0000  0.0000
    </tableData>
   </table>
  </function>

</turbine_engine>
