<?xml version="1.0"?>
<!--
  File:     F100-PW-229.xml
  Author:   Aero-Matic v 0.8

  Inputs:
    name:           F100
    type:           turbine
    thrust:         17800 lb
    augmented?      yes
    injected?       no
-->

<turbine_engine name="F100-PW-220">
  <!-- glideslope: JSBSim's F100-PW-229 with the changes listed in
       tools/make_f15c.py, which made it. Do not edit it by hand. -->
  <milthrust>   14370.0 </milthrust>
  <maxthrust>   23450.0 </maxthrust>
  <bypassratio>     0.4 </bypassratio>
  <tsfc>            0.74 </tsfc>
  <atsfc>           2.05 </atsfc>
  <idlen1>         40.0 </idlen1>
  <idlen2>         53.0 </idlen2>
  <maxn1>         100.0 </maxn1>
  <maxn2>         100.0 </maxn2>
  <augmented>         1 </augmented>
  <augmethod>         1 </augmethod>
  <injected>          0 </injected>

  <function name="IdleThrust">
   <table>
    <independentVar lookup="row">velocities/mach</independentVar>
    <independentVar lookup="column">atmosphere/density-altitude</independentVar>
    <tableData>
          -10000        0    10000    20000    30000    40000    50000    60000    70000    80000
     0.0   0.0430   0.0488   0.0528   0.0694   0.0899   0.1183   0.1467   0.0000   0.0000   0.0000
     0.2   0.0500   0.0501   0.0335   0.0544   0.0797   0.1049   0.1342   0.0000   0.0000   0.0000
     0.4   0.0040   0.0047   0.0020   0.0272   0.0595   0.0891   0.1203   0.0000   0.0000   0.0000
     0.6  -0.0804  -0.0804  -0.0560  -0.0237   0.0276   0.0718   0.1073   0.0000   0.0000   0.0000
     0.8  -0.2129  -0.2129  -0.1498  -0.1025   0.0474   0.0868   0.0900   0.0000   0.0000   0.0000
     1.0  -0.2839  -0.2839  -0.1104  -0.0469  -0.0270   0.0552   0.0800   0.0000   0.0000   0.0000
     1.2  -0.2839  -0.2839  -0.1104  -0.0469  -0.0270   0.0552   0.0800   0.0000   0.0000   0.0000
     1.4  -0.2839  -0.2839  -0.1104  -0.0469  -0.0270   0.0552   0.0800   0.0000   0.0000   0.0000
     1.6  -0.2839  -0.2839  -0.1104  -0.0469  -0.0270   0.0552   0.0800   0.0000   0.0000   0.0000
     1.8  -0.2839  -0.2839  -0.1104  -0.0469  -0.0270   0.0552   0.0800   0.0000   0.0000   0.0000
     2.0  -0.2839  -0.2839  -0.1104  -0.0469  -0.0270   0.0552   0.0800   0.0000   0.0000   0.0000
     2.2  -0.2839  -0.2839  -0.1104  -0.0469  -0.0270   0.0552   0.0800   0.0000   0.0000   0.0000
     2.4  -0.2839  -0.2839  -0.1104  -0.0469  -0.0270   0.0552   0.0800   0.0000   0.0000   0.0000
     2.6  -0.2839  -0.2839  -0.1104  -0.0469  -0.0270   0.0552   0.0800   0.0000   0.0000   0.0000
    </tableData>
   </table>
  </function>

  <function name="MilThrust">
   <table>
    <independentVar lookup="row">velocities/mach</independentVar>
    <independentVar lookup="column">atmosphere/density-altitude</independentVar>
    <tableData>
          -10000        0    10000    20000    30000    40000    50000    60000    70000    80000
     0.0   1.0871   1.0000   0.7551   0.5465   0.3680   0.1832   0.0159   0.0912   0.0515   0.0288
     0.2   1.0530   1.0165   0.7724   0.5633   0.3822   0.2003   0.0330   0.0926   0.0523   0.0292
     0.4   0.9473   1.0636   0.8163   0.6038   0.4170   0.2289   0.0569   0.0969   0.0547   0.0306
     0.6   0.7813   0.9564   0.8859   0.6697   0.4719   0.2679   0.0854   0.1044   0.0589   0.0330
     0.8   0.5715   0.7930   0.9170   0.7560   0.5143   0.2925   0.1238   0.1153   0.0651   0.0364
     1.0   0.2765   0.5731   0.7265   0.8326   0.6165   0.3642   0.1616   0.1301   0.0734   0.0411
     1.2   0.2211   0.2489   0.4605   0.6443   0.7039   0.4268   0.1983   0.1493   0.0843   0.0472
     1.4   0.2211   0.2211   0.0994   0.3758   0.5689   0.4774   0.2281   0.1649   0.0931   0.0521
     1.6   0.2211   0.2211   0.0994   0.0448   0.3192   0.3106   0.1301   0.1136   0.0641   0.0359
     1.8   0.2211   0.2211   0.0994   0.0448   0.0263   0.0831  -0.0037   0.0436   0.0246   0.0138
     2.0   0.2211   0.2211   0.0994   0.0448   0.0263  -0.0584  -0.0870   0.0000   0.0000   0.0000
     2.2   0.2211   0.2211   0.0994   0.0448   0.0263  -0.0584  -0.0870   0.0000   0.0000   0.0000
     2.4   0.2211   0.2211   0.0994   0.0448   0.0263  -0.0584  -0.0870   0.0000   0.0000   0.0000
     2.6   0.2211   0.2211   0.0994   0.0448   0.0263  -0.0584  -0.0870   0.0000   0.0000   0.0000
    </tableData>
   </table>
  </function>

  <function name="AugThrust">
   <table>
    <independentVar lookup="row">velocities/mach</independentVar>
    <independentVar lookup="column">atmosphere/density-altitude</independentVar>
    <tableData>
          -10000        0    10000    20000    30000    40000    50000    60000    70000    80000
     0.0   1.2360   1.0000   0.7970   0.6242   0.4790   0.3246   0.1858   0.1057   0.0597   0.0334
     0.2   1.2501   1.0115   0.8061   0.6313   0.4845   0.3283   0.1880   0.1069   0.0604   0.0338
     0.4   1.2929   1.0461   0.8337   0.6529   0.5011   0.3395   0.1944   0.1106   0.0624   0.0349
     0.6   1.3652   1.1045   0.8803   0.6894   0.5291   0.3585   0.2053   0.1168   0.0659   0.0369
     0.8   1.4683   1.1880   0.9468   0.7415   0.5691   0.3856   0.2208   0.1256   0.0709   0.0397
     1.0   1.6041   1.2979   1.0344   0.8101   0.6217   0.4213   0.2412   0.1372   0.0775   0.0433
     1.2   1.7749   1.4361   1.1445   0.8964   0.6879   0.4661   0.2669   0.1518   0.0857   0.0480
     1.4   1.8824   1.6047   1.2789   1.0017   0.7687   0.5209   0.2982   0.1697   0.0958   0.0536
     1.6   1.7982   1.6617   1.4395   1.1274   0.8652   0.5863   0.3357   0.1910   0.1078   0.0603
     1.8   1.6869   1.5795   1.4551   1.2752   0.9786   0.6631   0.3797   0.2160   0.1220   0.0682
     2.0   1.5441   1.4722   1.3772   1.2638   1.1102   0.7523   0.4307   0.2450   0.1384   0.0774
     2.2   1.3655   1.3365   1.2770   1.1926   1.0885   0.8195   0.4692   0.2669   0.1507   0.0843
     2.4   1.1471   1.1689   1.1517   1.1020   1.0258   0.7802   0.4467   0.2541   0.1435   0.0803
     2.6   0.8847   0.9659   0.9986   0.9898   0.9467   0.7299   0.4179   0.2378   0.1342   0.0751
    </tableData>
   </table>
  </function>

</turbine_engine>
