<?xml version="1.0"?>
<!--
  File:     F119-PW-100.xml
  Author:   Aero-Matic v 0.8

  Inputs:
    name:           F119-PW-100
    type:           turbine
    thrust:         37000.8 lb
    augmented?      yes
    injected?       no
-->

<turbine_engine name="F119-PW-100">
  <!-- glideslope: JSBSim's F119-PW-1 with the changes listed in
       tools/make_f22.py, which made it. Do not edit it by hand. -->
  <milthrust>   26950.0 </milthrust>
  <maxthrust>   35000.0 </maxthrust>
  <bypassratio>     0.2 </bypassratio>
  <tsfc>            0.8 </tsfc>
  <atsfc>           1.95 </atsfc>
  <idlen1>         40.0 </idlen1>
  <idlen2>         53.0 </idlen2>
  <maxn1>         100.0 </maxn1>
  <maxn2>         100.0 </maxn2>
  <augmented>         1 </augmented>
  <augmethod>         1 </augmethod>
  <injected>          0 </injected>

  <function name="IdleThrust">
   <table>
    <independentVar lookup="row">velocities/mach</independentVar>
    <independentVar lookup="column">atmosphere/density-altitude</independentVar>
    <tableData>
          -10000        0    10000    20000    30000    40000    50000    60000    70000    80000
     0.0   0.0430   0.0488   0.0528   0.0694   0.0899   0.1183   0.1467   0.0000   0.0000   0.0000
     0.2   0.0500   0.0501   0.0335   0.0544   0.0797   0.1049   0.1342   0.0000   0.0000   0.0000
     0.4   0.0040   0.0047   0.0020   0.0272   0.0595   0.0891   0.1203   0.0000   0.0000   0.0000
     0.6   0.0000   0.0000   0.0000   0.0000   0.0276   0.0718   0.1073   0.0000   0.0000   0.0000
     0.8   0.0000   0.0000   0.0000   0.0000   0.0474   0.0868   0.0900   0.0000   0.0000   0.0000
     1.0   0.0000   0.0000   0.0000   0.0000   0.0000   0.0552   0.0800   0.0000   0.0000   0.0000
     1.2   0.0000   0.0000   0.0000   0.0000   0.0000   0.0552   0.0800   0.0000   0.0000   0.0000
     1.4   0.0000   0.0000   0.0000   0.0000   0.0000   0.0552   0.0800   0.0000   0.0000   0.0000
     1.6   0.0000   0.0000   0.0000   0.0000   0.0000   0.0552   0.0800   0.0000   0.0000   0.0000
     1.8   0.0000   0.0000   0.0000   0.0000   0.0000   0.0552   0.0800   0.0000   0.0000   0.0000
     2.0   0.0000   0.0000   0.0000   0.0000   0.0000   0.0552   0.0800   0.0000   0.0000   0.0000
     2.2   0.0000   0.0000   0.0000   0.0000   0.0000   0.0552   0.0800   0.0000   0.0000   0.0000
     2.4   0.0000   0.0000   0.0000   0.0000   0.0000   0.0552   0.0800   0.0000   0.0000   0.0000
     2.6   0.0000   0.0000   0.0000   0.0000   0.0000   0.0552   0.0800   0.0000   0.0000   0.0000

    </tableData>
   </table>
  </function>

  <function name="MilThrust">
   <table>
    <independentVar lookup="row">velocities/mach</independentVar>
    <independentVar lookup="column">atmosphere/density-altitude</independentVar>
    <tableData>
          -10000        0    10000    20000    30000    40000    50000    60000    70000    80000
     0.0   1.2920   1.0000   0.7551   0.5465   0.3680   0.1832   0.0159   0.0912   0.0515   0.0288
     0.2   1.3152   1.0165   0.7724   0.5633   0.3822   0.2003   0.0330   0.0926   0.0523   0.0292
     0.4   1.3619   1.0636   0.8163   0.6038   0.4170   0.2289   0.0569   0.0969   0.0547   0.0306
     0.6   1.4652   1.1452   0.8795   0.6619   0.4719   0.2679   0.0854   0.1044   0.0589   0.0330
     0.8   1.4131   1.2647   0.9713   0.7310   0.5143   0.2925   0.1238   0.1153   0.0651   0.0364
     1.0   1.0605   1.2783   1.0959   0.8247   0.6062   0.3642   0.1616   0.1301   0.0734   0.0411
     1.2   0.5615   0.9195   1.1298   0.9468   0.6959   0.4268   0.1983   0.1493   0.0843   0.0472
     1.4   0.0000   0.4203   0.7789   0.9842   0.8097   0.5061   0.2450   0.1737   0.0981   0.0549
     1.6   0.0000   0.0000   0.2966   0.6537   0.8517   0.6049   0.3031   0.2041   0.1153   0.0645
     1.8   0.0000   0.0000   0.0000   0.2041   0.5529   0.5232   0.2550   0.1790   0.1011   0.0565
     2.0   0.0000   0.0000   0.0000   0.0000   0.1498   0.2593   0.0999   0.0978   0.0552   0.0309
     2.2   0.0000   0.0000   0.0000   0.0000   0.0000  -0.0584  -0.0870   0.0000   0.0000   0.0000
     2.4   0.0000   0.0000   0.0000   0.0000   0.0000  -0.0584  -0.0870   0.0000   0.0000   0.0000
     2.6   0.0000   0.0000   0.0000   0.0000   0.0000  -0.0584  -0.0870   0.0000   0.0000   0.0000

    </tableData>
</table>
  </function>

  <function name="AugThrust">
   <table>
    <independentVar lookup="row">velocities/mach</independentVar>
    <independentVar lookup="column">atmosphere/density-altitude</independentVar>
    <tableData>
          -10000        0    10000    20000    30000    40000    50000    60000    70000    80000
     0.0   1.2360   1.0000   0.7970   0.6242   0.4790   0.3246   0.1858   0.1057   0.0597   0.0334
     0.2   1.2501   1.0115   0.8061   0.6313   0.4845   0.3283   0.1880   0.1069   0.0604   0.0338
     0.4   1.2929   1.0461   0.8337   0.6529   0.5011   0.3395   0.1944   0.1106   0.0624   0.0349
     0.6   1.3652   1.1045   0.8803   0.6894   0.5291   0.3585   0.2053   0.1168   0.0659   0.0369
     0.8   1.4330   1.1880   0.9468   0.7415   0.5691   0.3856   0.2208   0.1256   0.0709   0.0397
     1.0   1.3889   1.2777   1.0344   0.8101   0.6217   0.4213   0.2412   0.1372   0.0775   0.0433
     1.2   1.3275   1.2328   1.1278   0.8964   0.6879   0.4661   0.2669   0.1518   0.0857   0.0480
     1.4   1.2452   1.1716   1.0839   0.9852   0.7687   0.5209   0.2982   0.1697   0.0958   0.0536
     1.6   1.1379   1.0907   1.0249   0.9439   0.8517   0.5863   0.3357   0.1910   0.1078   0.0603
     1.8   1.0016   0.9869   0.9480   0.8891   0.8143   0.6142   0.3517   0.2001   0.1130   0.0632
     2.0   0.8323   0.8567   0.8505   0.8184   0.7652   0.5833   0.3340   0.1900   0.1073   0.0600
     2.2   0.6259   0.6970   0.7297   0.7297   0.7025   0.5434   0.3111   0.1770   0.0999   0.0559
     2.4   0.3785   0.5042   0.5829   0.6210   0.6247   0.4933   0.2824   0.1607   0.0907   0.0508
     2.6   0.0862   0.2754   0.4076   0.4901   0.5300   0.4318   0.2473   0.1407   0.0794   0.0444

	</tableData>
   </table>
  </function>

</turbine_engine>
