<?xml version="1.0"?>
<!--
  File:     my_engine.xml
  Author:   Aero-Matic v 0.81

  Inputs:
    name:           my_engine
    type:           turbine
    thrust:         13847.68 lb
    augmented?      no
    injected?       no
-->

<turbine_engine name="TFE731-2">
  <!-- glideslope: JSBSim's Tay-620 made the Learjet 35A's TFE731-2 by
       tools/make_learjet35a.py, which made it. Do not edit it by hand. -->
  <milthrust> 3500 </milthrust>
  <bypassratio>     3.04 </bypassratio>
  <tsfc>            0.69 </tsfc>
  <bleed>           0.03</bleed>
  <idlen1>         30.0 </idlen1>
  <idlen2>         60.0 </idlen2>
  <maxn1>         100.0 </maxn1>
  <maxn2>         100.0 </maxn2>
  <augmented>         0 </augmented>
  <injected>          0 </injected>

  <function name="IdleThrust">
   <table>
    <independentVar lookup="row">velocities/mach</independentVar>
    <independentVar lookup="column">atmosphere/density-altitude</independentVar>
    <tableData>
          -10000        0    10000    20000    30000    40000    50000    60000    70000    80000
     0.0   0.0430   0.0488   0.0528   0.0694   0.0899   0.1183   0.1467   0.0000   0.0000   0.0000
     0.2   0.0500   0.0501   0.0335   0.0544   0.0797   0.1049   0.1342   0.0000   0.0000   0.0000
     0.4   0.0040   0.0047   0.0020   0.0272   0.0595   0.0891   0.1203   0.0000   0.0000   0.0000
     0.6   0.0000   0.0000   0.0000   0.0000   0.0276   0.0718   0.1073   0.0000   0.0000   0.0000
     0.8   0.0000   0.0000   0.0000   0.0000   0.0474   0.0868   0.0900   0.0000   0.0000   0.0000
     1.0   0.0000   0.0000   0.0000   0.0000   0.0000   0.0552   0.0800   0.0000   0.0000   0.0000
     1.2   0.0000   0.0000   0.0000   0.0000   0.0000   0.0552   0.0800   0.0000   0.0000   0.0000
     1.4   0.0000   0.0000   0.0000   0.0000   0.0000   0.0552   0.0800   0.0000   0.0000   0.0000
     1.6   0.0000   0.0000   0.0000   0.0000   0.0000   0.0552   0.0800   0.0000   0.0000   0.0000
     1.8   0.0000   0.0000   0.0000   0.0000   0.0000   0.0552   0.0800   0.0000   0.0000   0.0000
     2.0   0.0000   0.0000   0.0000   0.0000   0.0000   0.0552   0.0800   0.0000   0.0000   0.0000
     2.2   0.0000   0.0000   0.0000   0.0000   0.0000   0.0552   0.0800   0.0000   0.0000   0.0000
     2.4   0.0000   0.0000   0.0000   0.0000   0.0000   0.0552   0.0800   0.0000   0.0000   0.0000
     2.6   0.0000   0.0000   0.0000   0.0000   0.0000   0.0552   0.0800   0.0000   0.0000   0.0000
    </tableData>
   </table>
  </function>

  <function name="MilThrust">
   <table>
    <independentVar lookup="row">velocities/mach</independentVar>
    <independentVar lookup="column">atmosphere/density-altitude</independentVar>
    <tableData>
          -10000        0    10000    20000    30000    40000    50000    60000    70000    80000
     0.0   1.0748   1.0000   0.6703   0.4192   0.2275   0.0757  -0.0378   0.0708   0.0438   0.0271
     0.2   1.0640   0.9971   0.6970   0.4422   0.2452   0.0954  -0.0191   0.0728   0.0450   0.0278
     0.4   1.0220   0.9849   0.7674   0.4995   0.2893   0.1291   0.0085   0.0790   0.0489   0.0302
     0.6   0.9348   0.9500   0.8772   0.5861   0.3611   0.1770   0.0433   0.0903   0.0558   0.0345
     0.8   0.7612   0.8670   0.8570   0.7005   0.4254   0.2139   0.0928   0.1079   0.0667   0.0413
     1.0   0.4375   0.6941   0.7817   0.7581   0.5621   0.3124   0.1485   0.1340   0.0829   0.0512
     1.2   0.0000   0.3645   0.6139   0.6917   0.6604   0.4166   0.2147   0.1716   0.1061   0.0656
     1.4   0.0000   0.0000   0.2876   0.5340   0.6041   0.4594   0.2419   0.1871   0.1157   0.0715
     1.6   0.0000   0.0000   0.0000   0.2225   0.4624   0.3933   0.1999   0.1632   0.1009   0.0624
     1.8   0.0000   0.0000   0.0000   0.0000   0.1792   0.2418   0.1037   0.1085   0.0671   0.0415
     2.0   0.0000   0.0000   0.0000   0.0000   0.0000  -0.0466  -0.0794   0.0043   0.0027   0.0016
     2.2   0.0000   0.0000   0.0000   0.0000   0.0000  -0.0584  -0.0870   0.0000   0.0000   0.0000
     2.4   0.0000   0.0000   0.0000   0.0000   0.0000  -0.0584  -0.0870   0.0000   0.0000   0.0000
     2.6   0.0000   0.0000   0.0000   0.0000   0.0000  -0.0584  -0.0870   0.0000   0.0000   0.0000
    </tableData>
   </table>
  </function>

</turbine_engine>
