<?xml version="1.0"?>

<!--
  File:     Continental A-65-8.xml
  Author:   AeromatiC++ v 3.1.1

  See: http://wiki.flightgear.org/JSBSim_Engines#FGPiston

  Inputs:
    name:           Continental A-65-8
    type:           Piston Engine
    power:          65 hp
-->

<piston_engine name="Continental A-65-8">
  <!-- glideslope: JSBSim's J3Cub engine with the changes listed in
       tools/make_j3cub.py, which made it. Do not edit it by hand. -->
  <minmp unit="INHG">         10.0 </minmp>
  <maxmp unit="INHG">         28.5 </maxmp>
    <displacement unit="IN3"> 171.0 </displacement>
  <maxhp>        65 </maxhp>
  <cycles>         4.0 </cycles>
  <idlerpm>      700.0 </idlerpm>
  <maxrpm>      2300.0 </maxrpm>
  <sparkfaildrop>  0.1 </sparkfaildrop>
  <volumetric-efficiency> 0.85 </volumetric-efficiency>
  <man-press-lag> 0.1 </man-press-lag>
  <static-friction  unit="HP"> 0.325 </static-friction>
  <starter-torque> 52 </starter-torque>
  <starter-rpm> 1400 </starter-rpm>
 <!-- Defining <bsfc> over-rides the built-in horsepower calculations -->
 <!--<bsfc>           0.45 </bsfc>-->
  <stroke unit="IN">  3.625 </stroke>
  <bore unit="IN">    3.875 </bore>
  <cylinders>         4  </cylinders>
  <compression-ratio> 6.3 </compression-ratio>
  <!-- glideslope: the mixture's power shape, from the FAA's
       FAA-H-8083-32; see tools/piston_mixture.py -->
  <table name="MIXTURE" type="internal">
    <tableData>
      0.0500  0.0000
      0.0526  0.6005
      0.0556  1.0063
      0.0588  1.2278
      0.0625  1.2995
      0.0680  1.2806
      0.0725  1.2360
      0.0765  1.1796
      0.0800  1.1235
      0.0884  1.0004
      0.1000  0.8483
      0.1100  0.7055
      0.1176  0.5371
      0.1215  0.2971
      0.1250  0.0000
    </tableData>
  </table>
</piston_engine>
