<?xml version="1.0"?>

<propeller name="81 inch 2 blade variable-pitch propeller">
  <!-- glideslope: C_THRUST changed by tools/make_c182.py -->
  <ixx> 1.67 </ixx>
  <diameter unit="IN"> 81.0 </diameter>
  <numblades> 2 </numblades>
  <minpitch> 17.0 </minpitch>
  <maxpitch> 31.8 </maxpitch>
  <minrpm>    900 </minrpm>
  <maxrpm>   2400 </maxrpm>

  <table name="C_THRUST" type="internal">
    <tableData>
           17.0    21.0    26.0    32.0
      0.10  0.0916  0.1019  0.0974  0.1064
      0.15  0.0890  0.1019  0.0988  0.1045
      0.20  0.0862  0.1008  0.0996  0.1036
      0.25  0.0831  0.0990  0.0997  0.1025
      0.30  0.0786  0.0963  0.0997  0.1017
      0.35  0.0731  0.0922  0.0982  0.0995
      0.40  0.0671  0.0878  0.0964  0.0973
      0.45  0.0607  0.0821  0.0937  0.0956
      0.50  0.0536  0.0759  0.0906  0.0943
      0.55  0.0441  0.0694  0.0866  0.0930
      0.60  0.0346  0.0619  0.0817  0.0912
      0.65  0.0257  0.0539  0.0758  0.0889
      0.70  0.0179  0.0461  0.0688  0.0850
      0.75  0.0106  0.0372  0.0617  0.0810
      0.80  -0.0010  0.0294  0.0547  0.0752
      0.85  -0.0010  0.0224  0.0483  0.0703
      0.90  -0.0010  -0.0010  0.0416  0.0651
      0.95  -0.0010  -0.0010  0.0349  0.0591
      1.00  -0.0010  -0.0010  0.0280  0.0530
      1.05  -0.0010  -0.0010  0.0211  0.0467
      1.10  -0.0010  -0.0010  0.0142  0.0402
      1.15  -0.0010  -0.0010  0.0072  0.0337
      1.20  -0.0010  -0.0010  -0.0010  0.0270
      1.25  -0.0010  -0.0010  -0.0010  0.0201
      1.30  -0.0010  -0.0010  -0.0010  0.0130
      1.35  -0.0010  -0.0010  -0.0010  0.0056
      1.40  -0.0010  -0.0010  -0.0010  -0.0010
    </tableData>
  </table>

  <table name="C_POWER" type="internal">
    <tableData>
           17.0    21.0    26.0    32.0
      0.10  0.0400  0.0520  0.0769  0.1055
      0.15  0.0400  0.0521  0.0755  0.1029
      0.20  0.0400  0.0523  0.0740  0.1000
      0.25  0.0400  0.0525  0.0720  0.0972
      0.30  0.0397  0.0526  0.0695  0.0950
      0.35  0.0392  0.0527  0.0676  0.0922
      0.40  0.0384  0.0528  0.0663  0.0900
      0.45  0.0370  0.0523  0.0656  0.0880
      0.50  0.0348  0.0513  0.0658  0.0863
      0.55  0.0302  0.0498  0.0659  0.0852
      0.60  0.0255  0.0472  0.0656  0.0839
      0.65  0.0208  0.0436  0.0646  0.0835
      0.70  0.0164  0.0394  0.0620  0.0822
      0.75  0.0115  0.0345  0.0588  0.0814
      0.80  0.0000  0.0294  0.0551  0.0791
      0.85  0.0000  0.0238  0.0510  0.0766
      0.90  0.0000  0.0000  0.0461  0.0739
      0.95  0.0000  0.0000  0.0408  0.0700
      1.00  0.0000  0.0000  0.0349  0.0652
      1.05  0.0000  0.0000  0.0284  0.0597
      1.10  0.0000  0.0000  0.0214  0.0536
      1.15  0.0000  0.0000  0.0140  0.0469
      1.20  0.0000  0.0000  0.0000  0.0398
      1.25  0.0000  0.0000  0.0000  0.0321
      1.30  0.0000  0.0000  0.0000  0.0240
      1.35  0.0000  0.0000  0.0000  0.0157
    </tableData>
  </table>

</propeller>
