<?xml version="1.0"?>
<!--
  The de Havilland Hydromatic propeller of the Mosquito FB Mk VI, type
  A.5/147: three metal blades, 12 ft across, constant speed and fully
  feathering, driven through the Merlin 25's 0.42:1 reduction gear.

  Made by tools/make_mosquito_propeller.py, which computes the tables by
  blade-element momentum theory for a blade of estimated proportions and says
  what they are. Do not edit it by hand.

  The governor holds 1,800 to 3,000 engine rpm over the rpm lever's travel.
  The fine-pitch stop, 25 degrees, is estimated: above it the governor holds
  the rpm whenever the engine has the power, and at it a propeller with too
  little power - an engine throttled back, or failed and windmilling - turns
  slower. Feathering turns the blades to 87 degrees, edge on to the air, and
  the propeller stops.
-->
<propeller name="DH Hydromatic A.5/147">
  <ixx unit="SLUG*FT2"> 30 </ixx>
  <diameter unit="IN"> 144 </diameter>
  <numblades> 3 </numblades>
  <gearratio> 2.381 </gearratio>
  <minpitch> 25 </minpitch>
  <maxpitch> 87 </maxpitch>
  <minrpm> 756 </minrpm>
  <maxrpm> 1260 </maxrpm>
  <ct_factor> 0.95 </ct_factor>

  <table name="C_THRUST" type="internal">
    <tableData>
                15       20       25       30       35       40       45       50       55       60       65       70       75       80       87
     0.0    0.1652   0.1930   0.1944   0.1763   0.1581   0.1406   0.1265   0.1162   0.1057   0.0931   0.0780   0.0613   0.0440   0.0270   0.0060
     0.2    0.1456   0.1847   0.2027   0.1909   0.1709   0.1526   0.1363   0.1240   0.1140   0.1021   0.0875   0.0705   0.0521   0.0333   0.0081
     0.4    0.1124   0.1651   0.2018   0.2077   0.1880   0.1667   0.1466   0.1303   0.1185   0.1071   0.0931   0.0760   0.0565   0.0354   0.0052
     0.6    0.0629   0.1247   0.1845   0.2176   0.2102   0.1862   0.1623   0.1396   0.1223   0.1103   0.0965   0.0795   0.0594   0.0369   0.0031
     0.8    0.0064   0.0725   0.1389   0.2043   0.2312   0.2115   0.1853   0.1580   0.1309   0.1127   0.0988   0.0820   0.0614   0.0376   0.0009
     1.0   -0.0563   0.0149   0.0864   0.1570   0.2259   0.2392   0.2112   0.1824   0.1518   0.1195   0.1009   0.0837   0.0628   0.0380  -0.0015
     1.2   -0.1248  -0.0475   0.0299   0.1061   0.1804   0.2507   0.2416   0.2101   0.1773   0.1419   0.1049   0.0856   0.0639   0.0380  -0.0044
     1.4   -0.1987  -0.1146  -0.0306   0.0521   0.1325   0.2100   0.2699   0.2403   0.2057   0.1683   0.1260   0.0878   0.0648   0.0378  -0.0076
     1.6   -0.2115  -0.1862  -0.0948  -0.0050   0.0821   0.1660   0.2460   0.2731   0.2360   0.1968   0.1531   0.1011   0.0661   0.0373  -0.0111
     1.8   -0.2286  -0.2237  -0.1628  -0.0653   0.0293   0.1202   0.2067   0.2884   0.2680   0.2272   0.1817   0.1285   0.0682   0.0367  -0.0150
     2.0   -0.2574  -0.2378  -0.2291  -0.1286  -0.0259   0.0725   0.1661   0.2543   0.3008   0.2585   0.2115   0.1569   0.0903   0.0366  -0.0193
     2.2   -0.2963  -0.2612  -0.2493  -0.1950  -0.0837   0.0229   0.1241   0.2192   0.3078   0.2905   0.2424   0.1861   0.1180   0.0375  -0.0239
     2.4   -0.3462  -0.2933  -0.2670  -0.2540  -0.1440  -0.0287   0.0806   0.1832   0.2785   0.3228   0.2737   0.2160   0.1463   0.0595  -0.0288
     2.6   -0.4068  -0.3348  -0.2924  -0.2754  -0.2069  -0.0822   0.0356   0.1461   0.2485   0.3399   0.3047   0.2465   0.1750   0.0857  -0.0333
     2.8   -0.4777  -0.3859  -0.3245  -0.2949  -0.2696  -0.1379  -0.0109   0.1079   0.2178   0.3180   0.3361   0.2772   0.2040   0.1124  -0.0374
     3.0   -0.5588  -0.4463  -0.3648  -0.3200  -0.2981  -0.1955  -0.0589   0.0686   0.1863   0.2937   0.3648   0.3071   0.2332   0.1393  -0.0277
     3.2   -0.6498  -0.5157  -0.4134  -0.3501  -0.3187  -0.2553  -0.1086   0.0281   0.1541   0.2688   0.3656   0.3368   0.2623   0.1662  -0.0096
     3.4   -0.7500  -0.5941  -0.4698  -0.3866  -0.3417  -0.3089  -0.1598  -0.0135   0.1210   0.2434   0.3501   0.3660   0.2914   0.1931   0.0098
     3.6   -0.8473  -0.6812  -0.5340  -0.4297  -0.3694  -0.3352  -0.2127  -0.0563   0.0872   0.2175   0.3323   0.3923   0.3191   0.2198   0.0298
     3.8   -0.9467  -0.7770  -0.6058  -0.4793  -0.4005  -0.3573  -0.2673  -0.1004   0.0524   0.1909   0.3133   0.4014   0.3467   0.2463   0.0500
     4.0   -1.0503  -0.8815  -0.6851  -0.5353  -0.4369  -0.3810  -0.3234  -0.1457   0.0168   0.1638   0.2938   0.3952   0.3739   0.2724   0.0701
     4.2   -1.1591  -0.9896  -0.7719  -0.5977  -0.4785  -0.4083  -0.3598  -0.1922  -0.0196   0.1361   0.2738   0.3852   0.3991   0.2976   0.0902
     4.4   -1.2728  -1.0955  -0.8661  -0.6664  -0.5251  -0.4375  -0.3846  -0.2400  -0.0570   0.1079   0.2535   0.3733   0.4208   0.3219   0.1099
     4.6   -1.3916  -1.2048  -0.9677  -0.7413  -0.5769  -0.4706  -0.4081  -0.2890  -0.0953   0.0790   0.2328   0.3604   0.4310   0.3458   0.1294
     4.8   -1.5157  -1.3183  -1.0766  -0.8224  -0.6337  -0.5074  -0.4330  -0.3393  -0.1345   0.0495   0.2117   0.3468   0.4320   0.3691   0.1484
     5.0   -1.6452  -1.4366  -1.1929  -0.9096  -0.6954  -0.5483  -0.4604  -0.3857  -0.1746   0.0194   0.1903   0.3327   0.4290   0.3910   0.1668
     5.2   -1.7802  -1.5595  -1.3079  -1.0029  -0.7621  -0.5929  -0.4886  -0.4150  -0.2156  -0.0113   0.1684   0.3181   0.4239   0.4113   0.1846
     5.4   -1.9204  -1.6872  -1.4238  -1.1023  -0.8338  -0.6415  -0.5193  -0.4405  -0.2576  -0.0427   0.1462   0.3033   0.4174   0.4286   0.2017
     5.6   -2.0662  -1.8198  -1.5430  -1.2077  -0.9103  -0.6938  -0.5528  -0.4650  -0.3004  -0.0747   0.1235   0.2881   0.4098   0.4402   0.2177
     5.8   -2.2176  -1.9573  -1.6661  -1.3192  -0.9916  -0.7499  -0.5891  -0.4906  -0.3443  -0.1074   0.1004   0.2729   0.4016   0.4461   0.2331
     6.0   -2.3744  -2.0999  -1.7936  -1.4367  -1.0778  -0.8098  -0.6282  -0.5175  -0.3890  -0.1407   0.0768   0.2573   0.3927   0.4486   0.2478
    </tableData>
  </table>

  <table name="C_POWER" type="internal">
    <tableData>
                15       20       25       30       35       40       45       50       55       60       65       70       75       80       87
     0.0    0.0707   0.0985   0.1195   0.1394   0.1756   0.2243   0.2804   0.3275   0.3635   0.3899   0.4060   0.4095   0.3986   0.3714   0.3049
     0.2    0.0740   0.1074   0.1361   0.1528   0.1789   0.2236   0.2829   0.3433   0.3918   0.4318   0.4630   0.4842   0.4937   0.4895   0.4563
     0.4    0.0696   0.1124   0.1524   0.1760   0.1893   0.2229   0.2753   0.3428   0.4046   0.4555   0.4981   0.5324   0.5571   0.5712   0.5716
     0.6    0.0484   0.1005   0.1613   0.2060   0.2187   0.2308   0.2689   0.3317   0.4054   0.4676   0.5204   0.5649   0.6004   0.6258   0.6435
     0.8    0.0113   0.0695   0.1400   0.2209   0.2664   0.2655   0.2802   0.3226   0.3952   0.4725   0.5354   0.5897   0.6348   0.6700   0.7009
     1.0   -0.0448   0.0211   0.1006   0.1919   0.2938   0.3273   0.3163   0.3348   0.3861   0.4681   0.5460   0.6104   0.6653   0.7100   0.7533
     1.2   -0.1224  -0.0470   0.0431   0.1463   0.2612   0.3838   0.3861   0.3752   0.3987   0.4613   0.5518   0.6285   0.6939   0.7485   0.8047
     1.4   -0.2232  -0.1367  -0.0341   0.0829   0.2127   0.3537   0.4776   0.4455   0.4400   0.4745   0.5500   0.6447   0.7215   0.7867   0.8567
     1.6   -0.2614  -0.2494  -0.1324   0.0003   0.1471   0.3062   0.4763   0.5495   0.5103   0.5135   0.5643   0.6544   0.7482   0.8252   0.9101
     1.8   -0.2910  -0.3281  -0.2530  -0.1026   0.0632   0.2426   0.4341   0.6359   0.6112   0.5817   0.6011   0.6707   0.7742   0.8640   0.9651
     2.0   -0.3205  -0.3666  -0.3876  -0.2268  -0.0399   0.1621   0.3772   0.6039   0.7427   0.6776   0.6631   0.7061   0.7961   0.9031   1.0219
     2.2   -0.3491  -0.4056  -0.4493  -0.3730  -0.1628   0.0638   0.3050   0.5589   0.8234   0.8019   0.7527   0.7629   0.8320   0.9425   1.0805
     2.4   -0.3781  -0.4458  -0.4977  -0.5198  -0.3062  -0.0527   0.2169   0.5003   0.7956   0.9549   0.8688   0.8429   0.8855   0.9812   1.1407
     2.6   -0.4077  -0.4878  -0.5486  -0.5933  -0.4707  -0.1880   0.1123   0.4278   0.7562   1.0817   1.0082   0.9474   0.9582   1.0342   1.2026
     2.8   -0.4383  -0.5323  -0.6012  -0.6555  -0.6501  -0.3425  -0.0092   0.3408   0.7050   1.0776   1.1761   1.0781   1.0511   1.1030   1.2662
     3.0   -0.4699  -0.5795  -0.6576  -0.7203  -0.7538  -0.5166  -0.1479   0.2390   0.6416   1.0561   1.3589   1.2269   1.1653   1.1883   1.3317
     3.2   -0.5026  -0.6294  -0.7183  -0.7874  -0.8339  -0.7107  -0.3041   0.1222   0.5656   1.0230   1.4460   1.4002   1.3018   1.2908   1.4084
     3.4   -0.5374  -0.6822  -0.7831  -0.8586  -0.9133  -0.9007  -0.4782  -0.0099   0.4769   0.9794   1.4650   1.5963   1.4615   1.4113   1.4979
     3.6   -0.5894  -0.7378  -0.8521  -0.9349  -0.9973  -1.0153  -0.6703  -0.1576   0.3751   0.9255   1.4679   1.8028   1.6341   1.5504   1.6008
     3.8   -0.6507  -0.7964  -0.9254  -1.0162  -1.0832  -1.1147  -0.8806  -0.3211   0.2602   0.8607   1.4593   1.9425   1.8286   1.7087   1.7173
     4.0   -0.7178  -0.8579  -1.0030  -1.1027  -1.1747  -1.2141  -1.1093  -0.5004   0.1320   0.7853   1.4408   2.0109   2.0460   1.8867   1.8478
     4.2   -0.7886  -0.9280  -1.0849  -1.1946  -1.2721  -1.3188  -1.2785  -0.6958  -0.0097   0.6991   1.4130   2.0583   2.2746   2.0798   1.9927
     4.4   -0.8640  -1.0127  -1.1711  -1.2918  -1.3750  -1.4242  -1.4081  -0.9074  -0.1651   0.6021   1.3761   2.0934   2.5038   2.2861   2.1522
     4.6   -0.9438  -1.1043  -1.2616  -1.3944  -1.4840  -1.5355  -1.5307  -1.1354  -0.3341   0.4940   1.3309   2.1193   2.6792   2.5113   2.3266
     4.8   -1.0272  -1.2016  -1.3564  -1.5022  -1.5988  -1.6524  -1.6555  -1.3797  -0.5169   0.3749   1.2776   2.1371   2.8061   2.7559   2.5161
     5.0   -1.1144  -1.3035  -1.4555  -1.6154  -1.7193  -1.7757  -1.7852  -1.6185  -0.7137   0.2445   1.2159   2.1476   2.9108   3.0111   2.7211
     5.2   -1.2053  -1.4104  -1.5677  -1.7338  -1.8459  -1.9048  -1.9153  -1.7901  -0.9244   0.1028   1.1457   2.1514   3.0027   3.2761   2.9416
     5.4   -1.3000  -1.5227  -1.6896  -1.8576  -1.9786  -2.0405  -2.0503  -1.9467  -1.1492  -0.0502   1.0671   2.1474   3.0861   3.5385   3.1780
     5.6   -1.3983  -1.6396  -1.8183  -1.9867  -2.1175  -2.1821  -2.1911  -2.0986  -1.3880  -0.2146   0.9799   2.1373   3.1621   3.7725   3.4196
     5.8   -1.5004  -1.7610  -1.9529  -2.1212  -2.2621  -2.3298  -2.3380  -2.2535  -1.6410  -0.3905   0.8835   2.1200   3.2325   3.9733   3.6749
     6.0   -1.6063  -1.8869  -2.0929  -2.2609  -2.4128  -2.4841  -2.4909  -2.4123  -1.9082  -0.5778   0.7784   2.0968   3.2970   4.1556   3.9450
    </tableData>
  </table>

  <table name="CT_MACH" type="internal">
    <tableData>
     0.50   1.0641
     0.60   1.0978
     0.65   1.1188
     0.70   1.1434
     0.75   1.1724
     0.80   1.2068
     0.85   1.2439
     0.90   1.2736
     0.95   1.2922
     1.00   1.2970
     1.10   1.2546
    </tableData>
  </table>

  <table name="CP_MACH" type="internal">
    <tableData>
     0.50   1.0691
     0.60   1.1058
     0.65   1.1289
     0.70   1.1560
     0.75   1.1882
     0.80   1.2271
     0.85   1.2707
     0.90   1.3108
     0.95   1.3498
     1.00   1.3924
     1.10   1.5090
    </tableData>
  </table>
</propeller>
